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λ_1 := 30  # Вт/мК
λ_2 := 0.7  # Вт/мК
λ_3 := 0.05  # Вт/мК
δ := 0.11  # м
Т_с1 := 15  # оС
Т_с2 := -10  # оС
Т_с1 := Т_с1 + 273 = 288  # K
Т_с2 := Т_с2 + 273 = 263  # K
# Общее решение для стационарного температурного поля:
T(x) := -q_v/λ*x^2/2 + C_1/λ*x + C_2  # disabled
# Граничные условия 1 рода:
q_v := 0
T(δ) := -q_v/λ*x^2/2 + C_1/λ*x + C_2  # disabled
# При δ=0 ,Т(0) = С.2
С_2 := Т_с1 = 288  # К
Т(x) := Т_с1 - (Т_с1 - Т_с2)*x/δ
# Расчет плотности теплового потока:
q := -λ(d/dx*T)  # disabled
q_1 := λ_1*(Т_с1 - Т_с2)/δ = 6818.18  # Вт/м^2  # disabled
q_2 := λ_2*(Т_с1 - Т_с2)/δ = 159.091  # Вт/м^2  # disabled
q_3 := λ_3*(Т_с1 - Т_с2)/δ = 11.3636  # Вт/м^2  # disabled
# Температура в стенке:
Т(x) := Т_с1 - (Т_с1 - Т_с2)*x/δ
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λ := 11  # Вт/мК  # disabled
Т_1 := 7
Т_2 := 4
Т_3 := 2
Т_4 := -1
L_x := 0.26  # м
L_y := 0.28  # м
L_z := 0.29  # м
Т_1 := Т_1 + 273 = 280  # К
Т_2 := Т_2 + 273 = 277  # К
Т_3 := Т_3 + 273 = 275  # К
Т_4 := Т_4 + 273 = 272  # К
# Общий вид решения для нахождения теплового потока через грани:
q(L, Т_1, Т_2) := (Т_1 - Т_2)/L*λ
# Для верхней грани:
q_x1 := q(L_x, Т_1, Т_3) = 211.538  # Вт/м^2  # disabled
# Для нижней грани:
q_x2 := q(L_x, Т_2, Т_4) = 211.538  # Вт/м^2  # disabled
# Для правой грани:
q_y1 := q(L_y, Т_4, Т_3) = -117.857  # Вт/м^2  # disabled
# Для левой грани:
q_y2 := q(L_y, Т_2, Т_1) = -117.857  # Вт/м^2  # disabled
# Передняя и  задняя стенки изолированы,поэтому:
q_z1 := 0
q_z2 := q_z1 = 0
# Направление плотности теплового потока:
α := atan(q_y2/q_x1) = -0.508311
q_v := q_x1/cos(α) = 242.155
# Количество теплоты через каждую грань:
Q(q, S) := q*S
Q_x1 := Q(q_x1, L_x*L_z) = 15.95  # Вт
Q_x2 := Q(q_x2, L_x*L_z) = 15.95  # Вт
Q_y1 := Q(q_y1, L_y*L_z) = -9.57  # Вт
Q_y2 := Q(q_y2, L_y*L_z) = -9.57  # Вт
Q_z1 := 0
# тк стенки теплоизолированы
Q_z2 := Q_z1 = 0
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λ_1 := 41  # Вт/мК
α_2 := 1260  # Вт/(м^2*K)
δ_2 := 0.0001  # м
Т_ж1 := 620
Т_ж2 := 150
δ_1 := 0.005  # м
α_1 := 550  # Вт/(м^2*K)
Т_ж1 := Т_ж1 + 273 = 893  # К
Т_ж2 := Т_ж2 + 273 = 423  # К
λ_2 := 0.08  # Вт/мК
# Плотность теплового потока через стенку:
q_11 := (Т_ж1 - Т_ж2)/(1/α_1 + 1/α_2 + δ_1/λ_1) = 171923  # Вт/м^2
Т_с1 := Т_ж1 - q_11/α_1 = 580.413  # K
Т_с2 := Т_ж2 - q_11/α_2 = 286.553  # K
Т_c(x) := Т_с1 - (Т_с1 - Т_с2)/δ_1*x
Т_c(0) = 580.413  # K
Т_c(δ_1) = 286.553  # K
# Распределение температуры в стенке:
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# Плотность теплового потока через стенку с учетом загрязнения:
q_22 := (Т_ж1 - Т_ж2)/(1/α_1 + 1/α_2 + δ_1/λ_1 + δ_2/λ_2) = 117978  # Вт/м^2
Т_с1 := Т_ж1 - q_22/α_1 = 678.494  # K
Т_с2 := Т_ж1 - q_22/λ_2*δ_2 = 745.527  # K
Т_с3 := Т_ж2 + q_22/α_2 = 516.634  # K
# Распределение температуры в стенке с загрязнением:
x := [-δ_2; 0; δ_1]
Т_с := [Т_с1; Т_с2; Т_с3]
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# Ихменение теплового потока:
Δq := q_11 - q_22 = 53944.6  # Вт/м^2
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δ_1 := 0.003  # м
α_1 := 7  # Вт/(м^2*K)
Т_ж1 := -25 + 273 = 248  # K
L_1 := 2.4  # м
δ_2 := 0.035  # м
L_2 := 3.2  # м
α_2 := 9  # Вт/(м^2*K)
Т_ж2 := 35 + 273 = 308  # K
δ_3 := 0.004  # м
L_3 := 3.6  # м
λ_1 := 40  # Вт/мК
λ_2 := 0.056  # Вт/мК
λ_3 := 0.43  # Вт/мК
# Плотность теплового потока:
q_0 := (Т_ж2 - Т_ж1)/(1/α_1 + 1/α_2 + δ_1/λ_1 + δ_2/λ_2 + δ_3/λ_3) = 67.5413  # Вт/м^2
# Температуры стенок:
Т_с1 := Т_ж1 + q_0/α_1 = 257.649  # K
Т_с4 := Т_ж2 + q_0/α_2 = 315.505  # K
Т_с3 := Т_с4 + q_0/λ_3*δ_2 = 321.002  # K
Т_с2 := Т_с3 + q_0/λ_2*δ_2 = 363.215  # K
# Количество теплоты через стенки
Q_x4 := q_0*L_2*L_3 = 778.076  # Вт
Q_y4 := q_0*L_1*L_3 = 583.557  # Вт
Q_z4 := q_0*L_2*L_1 = 518.717  # Вт
# Распределение температуры:
Т_с := [Т_с1; Т_с2; Т_с3; Т_с4]
x := [0; δ_1; δ_1 + δ_2; δ_1 + δ_2 + δ_3]
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# Хладопроизводительность холодильной машины:
Q := 2*q_0*(L_1*L_2 + L_2*L_3 + L_1*L_3) = 3760.7  # Вт
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λ := 1.4
B := 1.15  # м
Т := 65 + 273 = 338  # К
q := 10  # Вт/м^2
Г := 230  # Вт/м^3
γ := 3.5  # м^-1
# Верхняя, передняя и нижняя стенки теплоизолированы:
d/dx*(λ*(d/dx*T)) + q_v0 =  # no stored result; disabled
λ*(d/dx*T) = integral(-Г*e^(-γx), x)  # disabled
d/dx*T = Г/(λ*γ) + С_1  # disabled
T(x) = Г/(λ*γ)*integral(e^(-γ*x), x) + C_1*x + C_2  # disabled
T(x) = -Г/(λ*γ^2)*e^(-γ*x) + C_1*x + C_2  # disabled
T(0) := Г/(λ*γ^2) + C_2 = T  # disabled
С_2 := Г/(λ*γ^2) + 338 = 351.411
q_x := -λ*(C_1 + Г/(λ*γ^2)*e^(-γ*B))  # disabled
C_1 := -(Г/(λ*γ^2)*e^(-γ*B)) - 0/λ = -0.239568  # при qx = 0
x :=
    L ← B - 0
    x_0 ← 0
    for i ∈ 0 .. 9
        x[i + 1] ← x[i] + L/10
    return x
Т(x) := Г/(λ*γ^2)*e^(-γ*x) + C_1*x + С_2
Т(B) = 351.375  # K
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Т_max := Т(0) = 364.822  # К
Т_min := Т(B) = 351.375  # К
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Т_ж1 := 1220 + 273 = 1493  # K
δ_1 := 0.29  # м
Т_ж2 := 35 + 273 = 308  # K
δ_2 := 0.15  # м
Вт/(м^2*K)
λ_1(Т) := 0.28 + 2.2*10^-4*Т  # Вт/мК
α_1 := 47
λ_2(Т) := 0.087 + 2.4*10^-4*Т  # Вт/мК
α_2 := 6  # Вт/(м^2*K)
# Эквивалентная теплопроводность:
λ_экв(Т) := 1/(T - T_0)*integral(λ(Т), Т = T_0 .. T)  # disabled
# Система уравнений имеет вид:
q := α_1*(Т_ж1 - T_c1)  # disabled
q := (λ_экв1/δ_1)*(Т_с1 - T_с2)  # disabled
q := (λ_экв2/δ_2)*(Т_с2 - T_c3)  # disabled
q := α_2*(Т_c3 - Т_ж2)  # disabled
λ_экв1 := λ_1((Т_с1 - T_с2)/2)  # disabled
λ_экв2 := λ_2((Т_с2 - T_с3)/2)  # disabled
# Зададим первые приблтижения для модуля Given Find:
q := 1000  # Вт/м^2
λ_экв1 := 0  # Вт/мК
λ_экв2 := 0  # Вт/мК
Т_с1 := 1373  # K
Т_с2 := 1373  # K
Т_с3 := 273  # K
# Подставим в систему уравнений:
Given
q == α_1*(Т_ж1 - Т_с1)
q == (λ_экв1/δ_1)*(Т_с1 - Т_с2)
q == (λ_экв2/δ_2)*(Т_с2 - Т_с3)
q == α_2*(Т_с3 - Т_ж2)
λ_экв1 == λ_1((Т_с1 - Т_с2)/2)
λ_экв2 == λ_2((Т_с2 - Т_с3)/2)
Find(q, Т_с1, Т_с2, Т_с3, λ_экв1, λ_экв2) = [587.033; 1480.51; 973.499; 405.839; 0.335771; 0.155119]
A := integral(λ(Т), Т = T_0 .. T)  # disabled
d/dx^2*A = 0  # disabled
# Тогда:
А(x) := C_1*x + C_2  # disabled
# При Т = Tc1
A_1 := integral(λ_1(T), T = 273 .. 1481) = 571.312
C_2 := A_1
А_1(δ_1) := C_1*δ_1 + C_2  # disabled
# При Т = Тс2
A_2 := integral(λ_1(Т), Т = 273 .. 973.499) = 292.189
С_1 := ((A_2 - C_2)/δ_1) = -962.493
A_1(x) := C_1*x + C_2
# Приближения для второго слоя:
С_3 := 1
С_4 := 1
Given
С_3*δ_1 + С_4 == integral(λ_2(Т), Т = 273 .. 973.499)
Find(С_3, С_4) = [254.876; 91.8099]
A_2(x) := С_3*x + С_4
Given
T_1 := 1273
T_2 := 1273
T_3 := 1273
К
T_4 := 1273
T_5 := 1273
T_6 := 1273
A_1(δ_1/4) == integral(λ_1(Т), Т = 273 .. T_1)
A_1(δ_1/2) == integral(λ_1(Т), Т = 273 .. T_2)
A_1(0.75*δ_1) == integral(λ_1(Т), Т = 273 .. T_3)
A_2(δ_1 + δ_2/4) == integral(λ_1(Т), Т = 273 .. T_4)
A_2(δ_1 + δ_2/2) == integral(λ_1(Т), Т = 273 .. T_5)
A_2(δ_1 + 0.75*δ_2) == integral(λ_1(Т), Т = 273 .. T_6)
Find(T_1, T_2, T_3, T_4, T_5, T_6) = [1480.97; 1480.94; 1480.91; 276.899; 277.009; 277.119]
x := [0; δ_1/4; δ_1/2; 0.75*δ_1; δ_1 + δ_2/4; δ_1 + δ_2/2; δ_1 + 0.75*δ_2]
T := [1.481*10^3; 1481; 1481; 1481; 973.499; 276.899; 277.009; 277.119; 405.839]
# Распределение температуры:
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