# Задачи 2 блока
# Сафонов А.А. | Вариант 18
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λ_из := 0.43
λ_ст := 20  # Вт/мК
d_1 := 28  # мм
δ_из := 20  # мм
d_2 := 32  # мм
T_c1 := -95  # oC
T_c2 := 8  # oC
# Плотность линейого теплового потока:
q_l := 2*π*(T_c2 - T_c1)/(1/λ_ст*ln(d_2/d_1) + 1/λ_из*ln((d_2 + 2*δ_из)/d_2)) = 341.954  # Вт/м
# Температура внутреннней стенки цилиндра:
Т_ст := T_c2 - q_l/(2*π*λ_из)*ln((d_2 + 2*δ_из)/d_2) = -94.6366  # oC
# Распределение температуры в стенке трубы:
T(x) := T_c1 - (T_c1 - Т_ст)/ln(d_2/d_1)*ln(x/(d_1/2))
# Распределение температуры в слое изоляции:
T_1(x) := Т_ст - (Т_ст - T_c2)/ln((d_2 + 2*δ_из)/d_2)*ln(x/(d_2/2))
f(x) :=
    T(x) if d_1/2 < x and x < d_2/2
    T_1(x) if d_2/2 < x and x < d_2/2 + δ_из
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ρ := 1.7*10^-8
d := 0.0022  # м
T_max := 80  # оС
δ_из := 0.0009  # мм
T_ж := 20  # оС
δ := δ_из  # по условию
α_1 := 11
r_0 := d/2 = 0.0011
α_2 := 960
λ_m := 394  # Вт/(м*К)
# Провод находится в воздушной среде:
# 1)Без изоляции
T_max := q_v*r_0/(α_1*2) + T_ж + q_v*r_0^2/(4*λ_m)  # disabled  # где
q_v*r_0/(α_1*2) + T_ж = Т_с  # disabled
# Отсюда объемная плтность теплового потока:
q_v := (T_max - T_ж)/(r_0/(α_1*2) + r_0^2/(4*λ_m)) = 1199982  # Вт/м^3  # disabled
# Расчитаем допустимую силу тока:
q_v := Q/V = I^2*ρl/S/(π*r_0^2*l)  # disabled  # Расчетная формула
S := π*r_0^2 = 3.80133e-6
I := S*sqrt(q_v/ρ) = 31.9373  # А
# Найдем температуру стенки:
T_c := q_v*r_0/(2*α_1) + T_ж = 79.9991  # oC
# Зависимость температуры сиенки от радиуса провода:
T(r) := T_c + q_v*r_0^2/(4*λ_m)*(1 - (r/r_0)^2)
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# 2)С резиновой  изоляцией
q_l := (T_c1 - T_c2)/(1/(2*π*λ_из)*ln((r_0 + δ_из)/r_0))  # disabled
q_l := α_1*(T_c2 - T_ж)*2*π*(r_0 + δ)  # disabled
# Отсюда :
Т_c1 - T_ж = q_l/(2*π)*(1/(α_1*(r_0 + δ)) + 1/λ_из*ln*((r_0 + δ_из)/r_0))  # disabled
# Температура поверхности провода:
Т_c1 := Т_c2 + q_l*ln((r_0 + δ_из)/r_0)/(2*π*λ_из)  # disabled
# Найдем температуру наружной поверхности изоляции:
# при
q_l = q_v*r_0^2*π  # disabled
Т_c1 := T_ж + q_v*r_0^2/2*(1/(α_1*(r_0 + δ)) + ln((r_0 + δ_из)/r_0)/λ_из)
# Найдем распределение температуры в проводе:
T_1(r) := Т_c1 + q_v*r_0^2/(4*λ_m)*(1 - (r/r_0)^2)  # disabled
q_v := q_l/(π*r_0^2)  # disabled
q_v := 2*(T_max - T_ж)/(r_0^2*(1/(2*λ_m) + 1/(α_1*(r_0 + δ)) + ln((r_0 + δ)/r_0)/λ_из)) = 2117006  # Вт/м^3  # disabled
# Найдем допустимую силу тока:
I := S*sqrt(q_v/ρ) = 42.4201  # А
# Линейная плотность теплового потока в изоляции:
q_l := q_v*r_0^2*π = 8.04743  # Вт/м
# Температура наружной поверхности изоляции:
Т_c2 := T_ж + q_l/(α_1*2*π*(r_0 + δ)) = 78.2177
# Температура поверхности провода:
Т_c1 := Т_c2 + q_l*ln((r_0 + δ_из)/r_0)/(2*π*λ_из) = 79.9984
# Распределение температур в проводе:
T_1(r) := Т_c1 + q_v*r_0^2/(4*λ_m)*(1 - (r/r_0)^2)
# Распределение температур в изоляции:
T_2(r) := Т_c1 - (Т_c1 - Т_c2)/ln((r_0 + δ)/r_0)*ln(r/r_0)
f(r) :=
    T_1(r) if (0 ≤ r and r ≤ r_0)
    T_2(r) if (r_0 ≤ r and r ≤ r_0 + δ)
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# Провод находится в воде при температуре Тж = 20:
# 1)Без изоляции
q := α_2(T_c - T_ж)  # disabled
# отсюда
T_c := q_v*r_0/(2*α_2) + T_ж  # disabled
q := q_v*r_0/2  # disabled
# Выразим максимально допустимую температуру:
T_max := T_c + q_v*r_0^2/(4*λ_m)  # disabled
# Найдем q.v:
q_v := (T_max - T_ж)/(1/α_2 + r_0/(2*λ_m))*2/r_0 = 104587115  # Вт/м^3  # disabled
q_v := I^2/S^2*ρ  # disabled
# Из этой сичтемы найдем максимально допустимый ток:
I := π*r_0^2*sqrt(q_v/ρ) = 298.16  # А  # disabled
# Выразим температуру стенки:
T_c := q_v*r_0/(2*α_2) + T_ж = 79.9197  # oC  # disabled
# Построим график зависимости температуры от радиуса:
T(r) := T_c + q_v*r_0^2/(4*λ_m)*(1 - (r/r_0)^2)
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# 2) С изоляцией
d_кр := 2*λ_из/α_2 = 0.000895833  # мм  # меньше r.0 значит уменьшение теплоотдачи
# Найдем температуру поверхности провода;
Т_c1 := Т_c2 + q_l*ln((r_0 + δ_из)/r_0)/(2*π*λ_из)  # disabled
q_l := (T_c1 - T_c2)/(1/(2*π*λ_из)*ln((r_0 + δ_из)/r_0))  # disabled  # и
q_l := α_2*(T_c2 - T_ж)*2*π*(r_0 + δ)
# Отсюда:
Т_c1 := T_ж + q_v*r_0^2/2*(1/(α_2*(r_0 + δ)) + ln((r_0 + δ_из)/r_0)/λ_из)
# Распределение температры:
T_2(r) := Т_c1 + q_v*r_0^2/(4*λ_m)*(1 - (r/r_0)^2)  # disabled
# Найдем q.v:
q_v := 2*(T_max - T_ж)/(r_0^2*(1/(2*λ_m) + 1/(α_2*(r_0 + δ)) + ln((r_0 + δ)/r_0)/λ_из)) = 51857596  # Вт/м^3
# Найдем допустимый ток в провожде:
I := π*r_0^2*sqrt(q_v/ρ) = 209.951  # А
# Найдем q.l:
q_l := q_v*π*r_0^2 = 197.128  # Вт/м  # disabled
# Температура внешней пов-сти изоляции:
T_c2 := T_ж + q_l/(α_2*2*π*(r_0 + δ)) = 36.3405  # oC  # disabled
# Температура пов-сти провода:
Т_c1 := T_c2 + q_l*ln((r_0 + δ_из)/r_0)/(2*π*λ_из) = 79.9602  # oC  # disabled
# Распределение температур в проводе:
T_1(r) := Т_c1 + q_v*r_0^2/(4*λ_m)*(1 - (r/r_0)^2)
# Распределение температур в изоляции:
T_2(r) := Т_c1 - (Т_c1 - T_c2)/ln((r_0 + δ)/r_0)*ln(r/r_0)
f(r) :=
    T_1(r) if (0 ≤ r and r ≤ r_0)
    T_2(r) if (r_0 ≤ r and r ≤ r_0 + δ)
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# Вывод: В воздухе  увеличение теплоизоляционного слоя приведет к росту тепловых потерь , в воде же увеличение теплозоляционного слоя  будет эффективено из-за уменьшения тепловых потерь.
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d_1 := 0.004  # м
q_v := 5*10^8  # Вт/м^3
d_2 := 0.014  # м
λ_ст := 19  # Вт/мК
δ := 0.0005  # м
R_t := 2*10^-5  # м^2*K/Вт
α := 12200  # Вт/(м^2*К)
Т_ж. := 430  # oC
λ_топ(T) := 5500/(560 + T) + 0.942*10^-10*T^3
r_1 := d_1/2 = 0.002
r_2 := d_2/2 = 0.007
# Линейная плотность теплового потока:
q_l := q_v*π*(r_2^2 - r_1^2) = 70685.8  # Вт/м
q_l := (T_c4 - Т_ж)*2*π*α*(r_2 + δ)  # disabled
# Выразим температуру на поверхности изоляции:
T_c4 := Т_ж. + q_l/(2*π*α*(r_2 + δ)) = 552.951  # оС
# Выразим температуру внутри изоляции:
T_c3 := q_l*ln((r_2 + δ)/r_2)/(2*π*λ_ст) + T_c4 = 593.802  # оС
# Выразим внешнюю температуру твэла:
T_c2 := T_c3 + q_l*R_t/(2*π*r_2) = 625.945  # оС
# Запишем уравнение теплопроводности:
1/r*(d/dr(r*(d/dr(Λ)))) + q_v == 0
Λ_c2 := integral(λ_топ(T), T = 0 .. T_c2 + 273) = 5281.8
Λ(r) := q_v/4*(r_2^2 - r^2 - r_1^2*ln(r_2/r)) + Λ_c2
# Разобьем радиус с шагом
# 0,0005м
r :=
    r[0] ← r_1
    for i ∈ 1, 2 .. 9
        r[i] ← r[i - 1] + 0.0005
    r
    = [0.002; 0.0025; 0.003; 0.0035; 0.004; 0.0045; 0.005; 0.0055; 0.006; 0.0065]
Λ :=
    for i ∈ 0, 1 .. 9
        Α[i] ← Λ(r[i])
    Α
    = [10280.4; 10110.7; 9858.16; 9528.98; 9127; 8654.64; 8113.57; 7504.97; 6829.73; 6088.5]
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# Найдем температуры для каждого радиуса:
T :=
    for i ∈ 0, 1 .. 9
        T[i] ← root(integral(λ_топ(T), T = 0 .. T) - Λ[i], T, -1, 3000)
    T
    = [2506.18; 2453.91; 2374.36; 2267.75; 2133.65; 1971.98; 1784.28; 1574.83; 1351.11; 1122.67]
# Для построения общей зависимости добавим в таблицы данные для r1 , r2 и
# r2 + б
r := [0.002; 0.0025; 0.003; 0.0035; 0.004; 0.0045; 0.005; 0.0055; 0.006; 0.0065; 0.007; 0.007; 0.0075]
T := [
    2506.17706706;
    2453.90880616;
    2374.35589527;
    2267.74948359;
    2133.64610018;
    1971.98119076;
    1784.27678585;
    1574.82673729;
    1351.10510362;
    1122.66629976;
    T_c2 + 273;
    T_c3 + 273;
    T_c4 + 273
]
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