# Блок 3
# Сафонов Андрей ТФ-15-22
# Вариант 18
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T_g1 := 1470  # °C
α_1 := 535  # Вт/(м^2*К)  # Вт/(м^2*К)
δ_ct := 4*10^-3  # м
h_p := 0.012  # м
λ_ct := 20  # Вт/(м*К)
δ_p := 3*10^-3  # м
c := 0.01  # м
T_g2 := 136  # °C
α_2 := 39*10^3  # Вт/(м^2*К)
# При отсутствии ребер:
# Плотность теплового потока
q_0 := (T_g1 - T_g2)/(1/α_1 + 1/α_2 + δ_ct/λ_ct) = 636815  # Вт/м^2
# Количество теплоты
Q_0 := q_0*(δ_p + c)*N_p*b  # disabled
# Количество теплоты на единицу глубины и на количество ребер:
Q_0 := q_0*(δ_p + c) = 8278.59  # Вт/м
# Ребра находятся со стороны воды:
# Потери с торца при увеличении ребра:
H := h_p + δ_p/2
# Так как H - ребро конечной длины, то используем выражение:
υ(x) = υ_0*ch(m(H - x))/ch(mH)  # disabled
# Эффективность ребра :
η_p := Q_p/Q_0 = th(m*H)*λ_ct*m/α  # disabled
m := sqrt(2*α_2/(λ_ct*δ_p)) = 1140.18
1/м
th(mH) := (e^(m*H) - e^(-m*H))/(e^(m*H) + e^(-m*H))
η_p := λ_ct*th(m*H)*m/α_2 = 0.584705
# Количество тепла, отводимое от ребра
Q_p := q_0*η_p*δ_p*b*N_p  # disabled
# Количество тепла на единицу глубины
Q_p := q_0*η_p*δ_p = 1117.05  # Вт/м
# Количество тепла, отводимое от стенки:
Q_ct := q_0*c*b*N_p  # disabled
# Количество тепла на единицу глубины
Q_ct := q_0*c = 6368.15  # Вт/м
# Суммарное количество теплоты | Вт/м
Q_сум := Q_ct + Q_p = 7485.2  # Вт/м
# Эффективность оребренной стенки
η_ct := Q_сум/Q_0 = 0.904163
# Тепловой поток через стенку:
q_01 := (T_g1 - T_g2)/(1/α_1 + 1/(α_2*η_ct) + δ_ct/λ_ct) = 635990  # Вт/м^2
# Ребра находятся со стороны газа:
# Эффективность ребра:
m := sqrt(2*α_1/(λ_ct*δ_p)) = 133.542
1/м
th(mH) := (e^(m*H) - e^(-m*H))/(e^(m*H) + e^(-m*H))
η_p := λ_ct*th(m*H)*m/α_1 = 4.7281
# Количество тепла на единицу глубины
Q_p := q_0*η_p*δ_p = 9032.77  # Вт/м
# Количество тепла на единицу глубины
Q_ct := q_0*c = 6368.15  # Вт/м
# Суммарное количество теплоты
Q_сум := Q_ct + Q_p = 15400.9  # Вт/м
# Эффективность оребренной стенки:
η_ct := Q_сум/Q_0 = 1.86033
# Тепловой поток через стенку:
q_02 := (T_g1 - T_g2)/(1/(α_1*η_ct) + 1/α_2 + δ_ct/λ_ct) = 1084212  # Вт/м^2
# Ребра должны быть приварены со стороны, где α меньше - то есть со стороны газа
# Рассчитаем поверхность теплообмена для передачи 1000кВт тепла:
F_0 := 1000*10^3/q_02 = 0.922329  # м^2
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T_1 := 123 + 273 = 396  # К
δ := 0.4*10^-3  # м
α := 34  # Вт/(м^2*К)
d_H := 11*10^-3  # м
T_2 := 76 + 273 = 349  # К
l := 120*10^-3  # м
λ_m := 380  # Вт/(м*К)
λ_ct := 19.6  # Вт/(м*К)
# Решение для ребра:
υ(x) := c_1*sh(mx) + c_2*ch(mx)  # disabled
# Граничные условия
x := 0  # disabled
u(0) := c_1*sh(0) + c_2*ch(0)  # disabled
υ(0) := T_2 - T_g  # disabled
c_2 := T_2 - T_g  # disabled
x := 1  # disabled
-λ*(d/dx(υ(l))) := -λ*(c_1*m*ch(m*l) + c_2*m*sh(m*l))  # disabled
-λ*(d/dx(υ(l))) := α*υ(l) == α*(T_1 - T_g)  # disabled
-λ*(c_1*m*ch(m*l) + c_2*m*sh(m*l)) == α*(T_1 - T_g)  # disabled
# Подставим c_2:
-λ*(c_1*m*ch(m*l) + (T_2 - T_g)*m*sh(m*l)) == α*(T_1 - T_g)  # disabled
# Тогда:
c_1 == -α*(T_1 - T_g)/(λ*m*ch(m*l)) - λ*(T_2 - T_g)*m*sh(m*l)/(λ*m*ch(m*l)) == -α*(T_1 - T_g)/(λ*m*ch(m*l)) - (T_2 - T_g)*sh(m*l)/ch(m*l)  # disabled
# Подставим константы в начальное уравнение для ребра:
υ(x) := (-α*(T_1 - T_g)/(λ*m*ch(m*l)) - (T_2 - T_g)*sh(m*l)/ch(m*l))*sh(m*x) + (T_2 - T_g)*ch(m*x)  # disabled
υ(l) := (-α*(T_1 - T_g)/(λ*m*ch(m*l)) - (T_2 - T_g)*sh(m*l)/ch(m*l))*sh(m*l) + (T_2 - T_g)*ch(m*l)  # disabled
# Решая данную систему уравнений, получаем выражение для температуры газа:
T_g := (T_2/ch(m*l) - T_1*(1 + α*th(m*l)/(λ*m)))/(1/ch(m*l) - (1 + α*th(m*l)/(λ*m)))  # disabled
# Длина дуги окружности: | Внутренний диаметр:
d := π*d_H = 0.0345575  # м
d_vn := d_H - 2*δ = 0.0102  # м
# Площадь ребра:
F := π*((d_H/2)^2 - (d_vn/2)^2) = 1.33204e-5  # м^2
# Медная гильза:
m_m := sqrt(α*d/(λ_m*F)) = 15.2357
1/м
T_g := (T_2/cosh(m_m) - T_1*(1 + α*tanh(m_m)/(λ_m*m_m)))/(1/cosh(m_m) - (1 + α*tanh(m_m)/(λ_m*m_m))) = 396  # К
ΔT := T_1 - T_g = -2.25853e-5  # К
# Стальная гильза
m_ct := sqrt(α*d/(λ_ct*F)) = 67.0849
1/м
T_g := (T_2/cosh(m_ct) - T_1*(1 + α*tanh(m_ct)/(λ_ct*m_ct)))/(1/cosh(m_ct) - (1 + α*tanh(m_ct)/(λ_ct*m_ct))) = 396  # К
ΔT := T_1 - T_g = 0
# Наиболее близкую к реаьной температуру получаем при использовании стальной гильзы
