# Блок задач 4
# Сафонов Андрей ТФ-15-22
# Вариант 18
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d := 0.16  # м
α := 90  # Вт/(м^2*К)
τ_1 := 60*50 = 3000  # с
T_ж := 780  # °С
T_0 := 20  # °С
H := 0.15  # м
λ := 41  # Вт/мК
a := 6.5*10^-6  # м^2/с
T_k := 750  # °С
# 1)Решение для бесконечной  пластины толщиной δ=H/2
θ(X, Fo_x) := sum(2*sin(μx[k])/(μx[k] + sin(μx[k])*cos(μx[k]))*cos(μx[k]*X)*e^(-μx[k]^2*Fo_x), k = 1 .. inf)  # disabled
X(x_0) := 2*x_0/H
# 2)Решение для бесконечного цилиндра радиуса r=d/2
θ(R, Fo_r) := sum(2*J1(μr[k])/(μr[k]*(J1(μr[k])^2 + J0(μr[k])^2))*J0(μr[k]*R)*e^(-μr[k]^2*Fo_r), k = 1 .. inf)  # disabled
R(r_0) := 2*r_0/d
# Решение:
θ(R, Fo_r, X, Fo_x) := θ(R, Fo_r)*θ(X, Fo_x)  # disabled
# Определим температуру в центре болванки:
δ := H/2 = 0.075  # м
r := d/2 = 0.08  # м
# Число фурье:
Fo_x := a*τ_1/δ^2 = 3.46667
Fo_r := a*τ_1/r^2 = 3.04688
# Так как число фурье > 0.3(регулярный режим), можно взять первый член сумм для решений θ:
θ1(R, Fo_r) := 2*J1(μr_1)/(μr_1*(J1(μr_1)^2 + J0(μr_1)^2))*J0(μr_1*R)*e^(-μr_1^2*Fo_r)  # disabled
θ1(X, Fo_x) := 2*sin(μx_1)/(μx_1 + sin(μx_1)*cos(μx_1))*cos(μx_1*X)*e^(-μx_1^2*Fo_x)  # disabled
# Решим трансцендентные уравнения графическим методом:
J0(x)/J1(x) == x/Bi_r
Bi_r := α*r/λ = 0.17561
y(x) := J0(x)/J1(x)
f(x) := x/Bi_r
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Given
b(x) == 0
b(x) := y(x) - f(x)
x := 1
Find(x) = 0.579867
μr_1 := 0.58
Bi_x := α*δ/λ = 0.164634
1/tan(z) == z/Bi_x
φ(z) := 1/tan(z)
ξ(z) := z/Bi_x
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Given
b(z) == 0
b(z) := φ(z) - ξ(z)
z := 1
Find(z) = 0.394948
μx_1 := 0.395
# Температура в центре болванки через
τ_1 = 3000  # секунд :
Fo_x = 3.46667
X(0) = 0
Fo_r = 3.04688
R(0) = 0
θ(R, X, Fo_x, Fo_r) := 2*J1(μr_1)/(μr_1*(J1(μr_1)^2 + J0(μr_1)^2))*J0(μr_1*R)*e^(-μr_1^2*Fo_r)*(2*sin(μx_1)/(μx_1 + sin(μx_1)*cos(μx_1))*cos(μx_1*X)*e^(-μx_1^2*Fo_x))
θ(R(0), X(0), Fo_x, Fo_r) = 0.223457
θ == (T - T_ж)/(T_0 - T_ж)
T := T_ж + θ(R(0), X(0), Fo_x, Fo_r)*(T_0 - T_ж) = 610.173  # °С
# Определим время, в течении которого температура в центре болванки станет равной Tk
T_k = 750  # °С
θ_1 := (T_k - T_ж)/(T_0 - T_ж) = 0.0394737
θ(R, X, Fo_x, Fo_r) := 2*J1(μr_1)/(μr_1*(J1(μr_1)^2 + J0(μr_1)^2))*J0(μr_1*R)*e^(-μr_1^2*Fo_r)*(2*sin(μx_1)/(μx_1 + sin(μx_1)*cos(μx_1))*cos(μx_1*X)*e^(-μx_1^2*Fo_x))
θ_2(R, X) := 2*J1(μr_1)/(μr_1*(J1(μr_1)^2 + J0(μr_1)^2))*J0(μr_1*R)*(2*sin(μx_1)/(μx_1 + sin(μx_1)*cos(μx_1))*cos(μx_1*X))
θ_2(R(0), X(0)) = 1.06964
θ1/θ_2(R(0), X(0)) == e^(-μr_1^2*Fo_r)*e^(-μx_1^2*Fo_x)
ln(θ1/θ_2(R(0), X(0))) == -μr_1^2*Fo_r + (-μx_1^2*Fo_x)
Fo_x == a*τ2/δ^2
Fo_r == a*τ2/r^2
-ln(θ_1/θ_2(R(0), X(0))) == μr_1^2*a*τ2/r^2 + μx_1^2*a*τ2/δ^2
τ_2 := -ln(θ_1/θ_2(R(0), X(0)))/(μr_1^2*a/r^2 + μx_1^2*a/δ^2) = 6321.35  # с
# Определим температуры в середине образующей Tb , в центре основания Ta, и по периметру основания Tc:
Fo_r2 := a*τ_2/r^2 = 6.42012
Fo_x2 := a*τ_2/δ^2 = 7.30467
# В середине  образующей:
R(r) = 1
X(0) = 0
θ(R(r), X(0), Fo_x2, Fo_r2) = 0.0362231
T_b := T_ж + θ(R(d/2), X(0), Fo_x2, Fo_r2)*(T_0 - T_ж) = 752.47  # °С
# В центре основания:
R(0) = 0
X(δ) = 1
θ(R(0), X(δ), Fo_x2, Fo_r2) = 0.0364341
T_a := T_ж + θ(R(0), X(δ), Fo_x2, Fo_r2)*(T_0 - T_ж) = 752.31  # °С
# По периметру  основания:
R(r) = 1
X(δ) = 1
θ(R(r), X(δ), Fo_x2, Fo_r2) = 0.0334338
T_a := T_ж + θ(R(r), X(δ), Fo_x2, Fo_r2)*(T_0 - T_ж) = 754.59  # °С
