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ORIGIN := 1
n := 10  # - число узловых точек
Δt := 1  # [с]  # - шаг по времени
# Дано:
S1 := 0.8*10^-3  # [м]
λ1 := 25
# [Вт/мК]
ρ1 := 6550
# [кг/м^3]
Cp1 := 310  # [Дж/кгК]
S := 8.2*10^-3  # [м]
λ2 := 2.2  # [Вт/мК]
ρ2 := 10200
# [кг/м^3]
Cp := 495  # [Дж/кгК]
qv1 := 3*10^8
# [Вт/м^3]
α := 5000  # [Вт/м^2К]
rt := 20*10^-6
# [м^2К/Вт]
Tg := 310  # [^oC]
# Решение:
# Причины нестационарности:
qv2 := 4*10^8  # [Вт/м^3]
Tg2 := 410  # [^oC]
# Решение:
# толщина топливной пластины
x := [0; 0.4; 0.4; 0.72; 1.37; 2.01; 2.66; 3.3; 3.95; 4.6]*10^-3
T0 := [400; 600; 800; 1000; 1200; 1400; 1600; 1800; 2000; 2200]
S2 := S/13 = 0.000630769
# Расчет коэффициентов дискретных аналогов в уравнении:
a[i]*T[i, k] == b[i]*T[i - 1, k] + c[i]*T[i + 1, k] + d[j]
b[1] := 0
c[1] := λ1/S1
a0[1] := ρ1*Cp1*S1/(2*Δt)
a[1] := a0[1] + c[1] + α
b[2] := λ1/S1
c[2] := 1/rt
a0[2] := a0[1]
a[2] := a0[2] + b[2] + c[2]
b[3] := 1/rt
c[3] := 2*λ2/S2
a0[3] := 0
a[3] := b[3] + c[3]
b[4] := 2*λ2/S2
c[4] := λ2/S2
a0[4] := ρ2*Cp*S2/Δt
a[4] := a0[4] + b[4] + c[4]
i := 5 .. n - 1
b[i] := λ2/S2
c[i] := λ2/S2
a0[i] := ρ2*Cp*S2/Δt
a[i] := a0[i] + b[i] + c[i]
b[n] := 2*λ2/S2
c[n] := 0
a0[n] := ρ2*Cp*S2/Δt
a[n] := a0[n] + b[n]
# Расчет первого прогоночного коэффициента:
u[1] := c[1]/a[1]
i := 2 .. 10
u[i] := c[i]/(a[i] - b[i]*u[i - 1])
T(T0) :=
    m ← 1
    eps ← 1
    k ← 1
    for i ∈ 1 .. 10
        T[i, 1] ← T0[i]
    while eps > 10^-1
        k ← k + 1
        d[1] ← a0[1]*T[1, k - 1] + α*Tg
        d[2] ← a0[2]*T[2, k - 1]
        d[3] ← 0
        d[4] ← a0[4]*T[4, k - 1] + qv1*S2
        for i ∈ 5 .. 10
            d[i] ← a0[i]*T[i, k - 1] + qv1*S2
        v[1] ← d[1]/a[1]
        for i ∈ 2 .. 10
            v[i] ← (d[i] + b[i]*v[i - 1])/(a[i] - b[i]*u[i - 1])
        T[10, k] ← v[10]
        for i ∈ n - 1 .. 1
            T[i, k] ← u[i]*T[(i + 1, k)] + v[i]
        eps ← |T[m, k] - T[m, k - 1]|
    [T; k]
Ttemp := T(T0)[1]
k := T(T0)[2] = 58
T1 := Ttemp[:, k]
# Распределение температур в узловых точках в начальный момент времени.
T1 = [558.023; 597.705; 622.503; 800.257; 1101.33; 1347.85; 1539.71; 1676.82; 1759.11; 1786.55]
# Пересчет коэффициентов при Tg2 и qv2
b[1] := 0
c[1] := λ1/S1
a0[1] := ρ1*Cp1*S1/(2*Δt)
a[1] := a0[1] + c[1] + α
b[2] := λ1/S1
c[2] := 1/rt
a0[2] := a0[1]
a[2] := a0[2] + b[2] + c[2]
b[3] := 1/rt
c[3] := 2*λ2/S2
a0[3] := 0
a[3] := b[3] + c[3]
b[4] := 2*λ2/S2
c[4] := λ2/S2
a0[4] := ρ2*Cp*S2/Δt
a[4] := a0[4] + b[4] + c[4]
i := 5 .. n - 1
b[i] := λ2/S2
c[i] := λ2/S2
a0[i] := ρ2*Cp*S2/Δt
a[i] := a0[i] + b[i] + c[i]
b[n] := 2*λ2/S2
c[n] := 0
a0[n] := ρ2*Cp*S2/Δt
a[n] := a0[n] + b[n]
# Расчет первого прогоночного коэффициента.
u[1] := c[1]/a[1]
u[i] := c[i]/(a[i] - b[i]*u[i - 1])
T(T1) :=
    m ← 1
    eps ← 1
    k ← 1
    for i ∈ 1 .. 10
        T[i, 1] ← T1[i]
    while eps > 10^-1
        k ← k + 1
        d[1] ← a0[1]*T[1, k - 1] + α*Tg2
        d[2] ← a0[2]*T[2, k - 1]
        d[3] ← 0
        d[4] ← a0[4]*T[4, k - 1] + qv2*S2
        for i ∈ 5 .. n
            d[i] ← a0[i]*T[i, k - 1] + qv2*S2
        v[1] ← d[1]/a[1]
        for i ∈ 2 .. 10
            v[i] ← (d[i] + b[i]*v[i - 1])/(a[i] - b[i]*u[i - 1])
        T[10, k] ← v[10]
        for i ∈ n - 1 .. 1
            T[i, k] ← u[i]*T[(i + 1, k)] + v[i]
        eps ← |T[m, k] - T[m, k - 1]|
    [T; k]
Ttemp := T(T1)[1]
k := T(T1)[2] = 81
T(T1)[1] =  # no stored result
Tresize(dt) :=
    p ← 3
    i ← 0
    k ← 58
    while p^i < k
        T[:, i + 1] ← Ttemp[:, p^i]
        Time[i + 1] ← dt*(p^i - 1)
        Ind[i + 1] ← p^i
        i ← i + 1
    T[:, i + 1] ← Ttemp[:, k]
    [T; Time; Ind]
Tresize(Δt)[2] = [0; 2; 8; 26]
Tshort := Tresize(Δt)[1]
Tresize(Δt)[2] = [0; 2; 8; 26]
Tresize(Δt)[3] = [1; 3; 9; 27]
Tshort = [
    558.023, 637.762, 674.52, 711.956, 732.152;
    597.705, 674.704, 716.94, 760.302, 783.704;
    622.503, 698.137, 743.523, 790.543, 815.929;
    800.257, 866.103, 934.062, 1007.3, 1046.91;
    1101.33, 1154.23, 1249.39, 1370.79, 1437.06;
    1347.85, 1393.49, 1502.91, 1665.79, 1755.74;
    1539.71, 1581.58, 1697.59, 1893.67, 2003.24;
    1676.82, 1716.84, 1835.45, 2055.59, 2179.84;
    1759.11, 1798.31, 1917.75, 2152.39, 2285.72;
    1786.55, 1825.51, 1945.11, 2184.6, 2321
]
i := 1 .. 10
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