# Результаты экспериментов
#
# p := [1153262; 1276825; 1353318; 1415099] Пa  T := [297; 324; 343; 358] K
ORIGIN := 1
# Начальные параметры
#
# Т0 := 297 К
# p0 := 1153262 Па
# μ := 44*10^-3 кг/моль
#
# Критические параметры для CO_2
#
# pk := 7.383 МПа
# Tk := 304.2 K
#
# Из справочных таблиц
# ρ := 22.90 кг/м^3  υ := 1/ρ = 0.0436681м^3/кг
# Индивидуальная газовая постоянная
#
# R := 8.314 Дж/(моль*К)  Ru := R/μ = 188.955Дж/(кг*К)
# Коэффициент сжимаемости
#
# i := 1 .. 4  z[i] := p[i]*υ/(Ru*T[i])  z = [0.897385; 0.910738; 0.911828; 0.913505]
# Расчет констант a,b:
#
# B(T) == b - a/(Ru*T)  z == p*υ/(Ru*T) == 1 + B(T)/υ
Given
z[1] == 1 + 1/υ*(b - a/(Ru*T[1]))
z[2] == 1 + 1/υ*(b - a/(Ru*T[2]))
x := Find(a, b) → [392.690833508; 0.00251639105085]
a1 := x[1] = 392.691  # Пара 1 и 2
b1 := x[2] = 0.00251639
Given
z[1] == 1 + 1/υ*(b - a/(Ru*T[1]))
z[3] == 1 + 1/υ*(b - a/(Ru*T[3]))
x := Find(a, b) → [263.923100329; 0.000221863601757]
a2 := x[1] = 263.923  # Пара 1 и 3
b2 := x[2] = 0.000221864
Given
z[1] == 1 + 1/υ*(b - a/(Ru*T[1]))
z[4] == 1 + 1/υ*(b - a/(Ru*T[4]))
x := Find(a, b) → [231.848594252; -0.000349675811055]
a3 := x[1] = 231.849  # Пара 1 и 4
b3 := x[2] = -0.000349676
Given
z[2] == 1 + 1/υ*(b - a/(Ru*T[2]))
z[3] == 1 + 1/υ*(b - a/(Ru*T[3]))
x := Find(a, b) → [52.5961506615; -0.003038780668]
a4 := x[1] = 52.5962
# Пара 2 и 3
b4 := x[2] = -0.00303878
Given
z[2] == 1 + 1/υ*(b - a/(Ru*T[2]))
z[4] == 1 + 1/υ*(b - a/(Ru*T[4]))
x := Find(a, b) → [77.8873064071; -0.00262567008374]
a5 := x[1] = 77.8873  # Пара 2 и 4
b5 := x[2] = -0.00262567
Given
z[3] == 1 + 1/υ*(b - a/(Ru*T[3]))
z[4] == 1 + 1/υ*(b - a/(Ru*T[4]))
x := Find(a, b) → [113.284516568; -0.00210239667701]
a6 := x[1] = 113.285  # Пара 3 и 4
b6 := x[2] = -0.0021024
b := [1.218*10^-3; 1.339*10^-3; 1.308*10^-3; 1.745*10^-3; 1.409*10^-3; 1.241*10^-3]  # м^3/кг
a := [175.179; 181.923; 180.195; 207.953; 187.004; 175.626]  # Дж*м^3/кг^2
# Среднее значение и СКО для a и b
asr := sum(a[i], i = 1 .. 6)/6 = 184.647  # Дж*м^3/кг^2
bsr := sum(b[i], i = 1 .. 6)/6 = 0.00137667  # м^3/кг
Δa := sqrt(sum((asr - a[i])^2, i = 1 .. 6)/(6 - 1)) = 12.2228  # Дж*м^3/кг^2
Δb := sqrt(sum((bsr - b[i])^2, i = 1 .. 6)/(6 - 1)) = 0.000193095  # м^3/кг
# Уравнение состояния углекислого газа
p*υ/(R*T) == 1 + 1/υ*(1.377*10^-3 - 184.647/(R*T))
# Температура Бойля
B(Tb) == b - a/(Ru*Tb) == 0
# Табличное значение
#
# Ttb := 2.75*Tk = 836.55
# Tb := asr/(Ru*bsr) = 709.832K | K
# Погрешность температуры Бойля
# ΔTb := sqrt((1/(Ru*bsr))^2*Δa^2 + (-asr/(Ru*bsr^2))^2*Δb^2) = 110.094K
# Относительная погрешность
ΔTb/Tb = 0.155099
# Табличные данны
j := 1 .. 12
# Tt := [288.15; 293.15; 298.15; 303.15; 308.15; 313.15; 323.15; 333.15; 343.15; 353.15; 363.15; 373.15] K
Bt := [-3.041; -2.925; -2.857; -2.659; -2.595; -2.509; -2.351; -2.159; -1.979; -1.839; -1.711; -1.620]  # см^3/г
# Построение графика
k := 1 .. 29
Tbb := [273.15; 298.15; 323.15; 348.15; 373.15; 398.15; 423.15; 448.15; 473.15; 498.15; 523.15; 548.15; 573.15; 598.15; 623.15; 648.15; 673.15; 698.15; 723.15; 748.15; 773.15; 798.15; 823.15; 848.15; 873.15; 898.15; 923.15; 948.15; 973.15]
Bbb[k] := 10^3*(bsr - asr/(Ru*Tbb[k]))
Bbb = [-2.20086; -1.90088; -1.64732; -1.43017; -1.24212; -1.07769; -0.932683; -0.803857; -0.688644; -0.584994; -0.491252; -0.40606; -0.3283; -0.25704; -0.191498; -0.131011; -0.075018; -0.0230347; 0.0253543; 0.0705095; 0.112744; 0.152334; 0.189518; 0.22451; 0.257499; 0.288651; 0.318116; 0.346026; 0.372503]
см^3/г
# Экспериментальные точки
Bex[i] := 10^3*(bsr - asr/(Ru*T[i]))
Bex = [-1.91357; -1.63939; -1.47232; -1.35295]  # см^3/г
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