ORIGIN := 1
i := 1 .. 15
# Величины, необходимые для расчета
V_o := 0.114*10^-3  # м^3
V_δo := 0.558*10^-5  # м^3
E := 1.95*10^11  # Па
q := 1.009
a := 3
μ := 0.3
αt := 1.66*10^-5  # 1/K
β := 1/(E*(a^2 - 1))*(3*(1 - 2*μ)*a + 2*(1 + μ)*a^2)
β = 1.73077e-11  # 1/Па
# Абсолютное давление в пьезометре рассчитывается по формуле
Pa == P_mn + P_δap
# где_Pmn  избыточное давление, измеренное манометром МИДА, МПа
P_δap
# барометрическое давление, измеряемое барометром, мм рт. ст.
Uo := 0.9967  # В
# СПРАВКА: 1 кгс/см^2=0.0980665 МПа
# Протокол
# Напряжение,
# термометр
# сопротивления
# Напряжение,
# катушка
# Напряжение,
# манометр МИДА
# Массив времени
U_t := [11.91854; 11.92394; 11.92644; 11.92694; 11.92799; 11.92794; 11.92794; 11.92744; 11.92791; 11.92862; 11.92963; 11.92963; 11.92974; 11.93093; 11.93132]
# (В)
U_k := [10.000; 10.000; 10.000; 10.000; 10.000; 10.000; 10.000; 10.000; 10.000; 10.000; 10.000; 10.000; 10.000; 10.000; 10.000]
# (В)
Umn := [3.1732; 3.2173; 3.2581; 3.3019; 3.3260; 3.3569; 3.3812; 3.3925; 3.4037; 3.4146; 3.4227; 3.4285; 3.4327; 3.4357; 3.4370]  # (В)
tau := [0; 1; 2; 3; 4; 5; 6; 7; 8; 9; 10; 11; 12; 13; 14]  # (мин)
# Обработка результатов измерений:
# избыточное давление (МПа)), измеренное манометром МИДА
Pmn := (Umn - Uo)*20/(5 - Uo)  # МПа
Pmn = [10.8735; 11.0938; 11.2977; 11.5165; 11.6369; 11.7913; 11.9127; 11.9691; 12.0251; 12.0795; 12.12; 12.149; 12.17; 12.1849; 12.1914]
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# Средство измерения температуры:
# терморезистор ( платиновый термометр сопротивления)
# 1) Нахождение сопротивления термометра Rt, Ом
# Задание встроенной переменной, определяющей номер первого элемента массива
# Сопротивление образцовой катушки, Ом
Rk := 10.0
Rt := U_t*Rk/U_k
# 2) Вычисление платиновой температуры t_i
# (вспомогательный параметр градуировочной зависимости терморезистора)
# Задача: решить квадратное уравнение относительно t_i
# const -
α := 3.9260*10^-3
βt := 0.110
δ := 1.492
Ro := 10.0553
# parametr -
W := Rt/Ro
# Решение квадратного уравнения осуществляем с помощью стандартной встроенной функции  Mathcad root(F(x),x):
# Задаем начальное приближение по температуре, ^oC
tt := 50
# Уравнение для платиновой температуры Т =0...630 оС
t[i] := root(1/α*(W[i] - 1) + δ*tt/100*(tt/100 - 1) - tt, tt)
T[i] := t[i] + 0.015*(t[i]/100*(t[i]/100 - 1))*((t[i]/419.58 - 1)*(t[i]/630.74 - 1))
t = [46.8265; 46.9632; 47.0264; 47.0391; 47.0657; 47.0644; 47.0644; 47.0517; 47.0636; 47.0816; 47.1072; 47.1072; 47.1099; 47.1401; 47.1499]
T = [46.8234; 46.9601; 47.0234; 47.036; 47.0626; 47.0613; 47.0613; 47.0487; 47.0606; 47.0785; 47.1041; 47.1041; 47.1069; 47.137; 47.1469]
# Масса пустой колбы (5 взвешиваний для исключения случайной погрешности) -
M_k1 := 67.5979  # г
M_k2 := 67.5976  # г
M_k3 := 67.5975  # г
M_k4 := 67.5966  # г
M_k5 := 67.5970  # г
# Масса колбы с водой (5 взвешиваний для исключения случайной погрешности)
M_kp1 := 180.3925  # г
M_kp2 := 180.3915  # г
M_kp3 := 180.3916  # г
M_kp4 := 180.3910  # г
M_kp5 := 180.3904  # г
M_k := (M_k1 + M_k2 + M_k3 + M_k4 + M_k5)/5 = 67.5973  # г
M_kp := (M_kp1 + M_kp2 + M_kp3 + M_kp4 + M_kp5)/5 = 180.391  # г
# Результирующая масса выпуска
M_p := M_kp - M_k = 112.794  # г
# Образцовое сопротивление
R_10 := 10
# Oм
δR_10 := 0.0001
# Условия опыта
P_δap := 747
# мм.рт.ст
P_o := P_δap*133.332*10^-6  # МПа
T_o := 24 + 273.15  # K
# Средние значения экспериментальных данных
# Граничные номера точек
n0 := 1
n1 := 15
Tcp := 1/(n1 - n0 + 1)*sum(T[i], i = n0 .. n1)
P_mncp := sum(Pmn[i], i = n0 .. n1)*1/(n1 - n0 + 1)
Tcp = 47.0543  # ^oC
P_mncp = 11.8008  # МПа
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i := 1 .. 15
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P_o = 0.099599  # МПа
# Абсолютное давление в пьезометре
Pa := P_mncp + P_o = 11.9004  # МПа
# Из таблицы для плотности воды для давления Ро=746 мм. рт. ст.
746*133.332/98.0665*10^-3 = 1.01427  # кгс/см^2
# для давления 1 кгс/см^2 в интервале температур 20-30 С проводим линейную интерполяцию
ρ_20C1 := 1/0.0010018
ρ_30C1 := 1/0.0010044
T_o = 297.15
ρ_o := (ρ_20C1 - (T_o - 20 - 273.15)*(ρ_20C1 - ρ_30C1)/(30 - 20))
ρ_o = 997.17  # кг/м^3
# Из таблицы для плотности воздуха для давления Ро=746 мм. рт. ст.
746*133.332 = 99465.7  # Па
# для давления 99 кПа и 24 оС
ρ_bozd := 1.161  # кг/м^3
# Рассчитаем плотность воды при комнатной температуре и давлении в пьезометре P=Pmnср Т=24 С
Pa = 11.9004
Pa/0.0980665 = 121.35  # кгс/см^2
# Проводим линейную интерполяцию плотности воды при Ра=69.486 кгс/см^2
T_o = 297.15
ρ_20C2 := 1/0.0009998
ρ_30C2 := 1/0.001024
ρ := ρ_20C2 + (T_o - 20 - 273.15)*(ρ_20C2 - ρ_30C2)/(30 - 20)
ρ = 1009.66  # кг/м^3
# Масса выпуска с учетом поправки, связанной со взвешиванием в воздухе, определяется
# Плотность материала гирь
ρг := 7800  # кг/м^3
M_p = 112.794
M_b := M_p*(1 - ρ_bozd/ρг)/(1 - ρ_bozd/ρ_o) = 112.909  # г
ρ_o = 997.17
# Изменение массы воды в балластном объеме
V_o = 0.000114
ΔM_δo := (ρ - ρ_o)*V_δo = 6.96686e-5  # кг
# Поправка на барическую деформацию
ΔV_P := β*(Pa*10^6 - 1)*V_o = 2.34803e-8  # м^3
# Поправка на термическую деформацию
ΔV_T := 3*αt*(Tcp - 293.15 + 273.15)*V_o = 1.53593e-7  # м^3
# Определяем массу вещества, оставшегося в пьезометре
M_OCT == V_o/ρ_para  # где
ρ_para := 0.5779  # - плотность водяного пара при Т=100 С и Р=746 мм. рт. ст. или 1.014 кгс/см^2
M_OCT := V_o/ρ_para = 0.000197266  # кг
# Определяем удельный объем воды
v(Pa, Tcp) := (V_o + ΔV_P + ΔV_T)/(M_b*10^-3 - ΔM_δo + M_OCT)
v(Pa, Tcp) = 0.00101009  # м^3/кг
# Определяем плотность воды
1/v(Pa, Tcp) = 990.009  # кг/м^3
# Расчет погрешности
# 1. Температура
n1 = 15
# Случайная погрешность
n0 = 1
ΔTslu := 2.776*sqrt(sum((Tcp - T[n])^2, n = n0 .. n1)/((n1 - n0 + 1)*(n1 - n0))) = 0.0566415  # K
# Приборная погрешность определения температуры платиновым термометром сопротивления, которая равна 0.06 К
ΔT_plat := 0.06  # K
# Полная абсолютная погрешность
ΔT := sqrt(ΔT_plat^2 + ΔTslu^2) = 0.0825122  # K
# Полная относительная погрешность
δT := ΔT/Tcp = 0.175355 %
# 2. Давление.
# Не будем учитывать погрешность в определении атмосферного давления, так как она мала по сравнению с погрешностью определения грузопоршневого манометра
ΔP == ΔP_mn
# Случайная погрешность
ΔP_slu := 2.776*sqrt(sum((P_mncp - Pmn[n])^2, n = n0 .. n1)/((n1 - n0 + 1)*(n1 - n0))) = 0.305836  # МПа
# Приборная погрешность
ΔP_пр := P_mncp*0.001 = 0.0118008  # МПа
# Полная абсолютная погрешность
ΔP := sqrt(ΔP_пр^2 + ΔP_slu^2) = 0.306064  # МПа
# Полная относительная погрешность
δP := ΔP*100/P_mncp = 2.59359  # %
# Учтем погрешность прямого вычисления по формуле
v(P, T) == (V_o + ΔV_p + ΔV_T)/(M_B + M_OCT - ΔM_δo)
δV_o := 0.001  # %
ΔV_o := V_o*δV_o*0.01
ΔV_o = 1.14e-9  # м^3
ΔV_T == 3*αt*(T - 273.15)*V_o
ΔV_P == β*(P - 1)*V_o
ΔV_T = 1.53593e-7  # м^3
ΔV_P = 2.34803e-8  # м^3
δV_δo := 0.1  # %
ΔV_δo := V_δo*δV_δo*0.01
ΔV_δo = 5.58e-9  # м^3
δΔV_P := sqrt(δP^2 + δV_o^2)
δΔV_P = 2.59359
δΔV_T := sqrt(δT^2 + δV_o^2)
δΔV_T = 0.00201865
ΔΔM_δo := ΔV_δo*(ρ - ρ_o)
ΔΔM_δo = 6.96686e-8
ΔΔV_T := ΔV_T*δΔV_T
ΔΔV_T = 3.1005e-10
ΔΔV_P := ΔV_P*δΔV_P
ΔΔV_P = 6.08984e-8
# Рассчитаем погрешность определения массы выпуска -
M_k := nthroot(M_k1*M_k2*M_k3*M_k4*M_k5, 5) = 67.5973  # г
M_kp := nthroot(M_kp1*M_kp2*M_kp3*M_kp4*M_kp5, 5) = 180.391  # г
# Результирующаm масса выпуска
M_p := M_kp - M_k = 112.794  # г
ΔM_k := 0.1*10^-3  # г
δM_k1 := ΔM_k/M_k1
ΔM_kp := 0.1*10^-3  # г
δM_kp1 := ΔM_kp/M_kp1
δM_k2 := ΔM_k/M_k2
δM_kp2 := ΔM_kp/M_kp2
δM_k3 := ΔM_k/M_k3
δM_kp3 := ΔM_kp/M_kp3
δM_k4 := ΔM_k/M_k4
δM_kp4 := ΔM_kp/M_kp4
δM_k5 := ΔM_k/M_k5
δM_kp5 := ΔM_kp/M_kp5
δM_k := 1/2*sqrt(δM_k1^2 + δM_k2^2 + δM_k3^2 + δM_k4^2 + δM_k5^2) = 1.65396e-6
δM_kp := 1/2*sqrt(δM_kp1^2 + δM_kp2^2 + δM_kp3^2 + δM_kp4^2 + δM_kp5^2) = 6.19782e-7
ΔM_k := M_k*δM_k = 0.000111803  # г
ΔM_kp := M_kp*δM_kp = 0.000111803  # г
ΔM_p := ΔM_kp + ΔM_k = 0.000223607  # г
ΔM_b := ΔM_p*(1 - ρ_bozd/ρ)/(1 - ρ_bozd/ρ_o) = 0.00022361  # г
# Погрешность определения массы остатка
# В итоге
ΔM_OCT := ΔV_o/ρ_para = 1.97266e-9  # кг
Δ_1 := sqrt(ΔV_o^2 + ΔΔV_T^2 + ΔΔV_P^2)
δ_1 := Δ_1/(V_o + ΔV_P + ΔV_T) = 0.000533469
Δ_2 := sqrt(ΔM_b^2 + ΔΔM_δo^2 + ΔM_OCT^2)
δ_2 := Δ_2/(M_b*10^-3 - ΔM_δo + M_OCT) = 0.00197821
δv_pr := sqrt(δ_1^2 + δ_2^2) = 0.00204888
Δρ_pr := δv_pr*1/v(Pa, Tcp) = 2.02841  # кг/м^3
Δv_pr := δv_pr*v(Pa, Tcp) = 2.06956e-6  # м^3/кг
# Общая погрешность вычисления удельного объема.
Δv := sqrt(Δv_pr^2) = 2.06956e-6  # м^3/кг
δv := Δv/v(Pa, Tcp) = 0.204888 %
# График зависимости P(T)  (апроксимация мнк)
Pmn = [10.8735; 11.0938; 11.2977; 11.5165; 11.6369; 11.7913; 11.9127; 11.9691; 12.0251; 12.0795; 12.12; 12.149; 12.17; 12.1849; 12.1914]
T = [46.8234; 46.9601; 47.0234; 47.036; 47.0626; 47.0613; 47.0613; 47.0487; 47.0606; 47.0785; 47.1041; 47.1041; 47.1069; 47.137; 47.1469]
i := 1 .. 15
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n2 := 1
n3 := 15
ZC(x) := a[1] + a[2]*x
ZCm(x) := b[1] + b[2]*x  # error: Эта переменная не определена.
F(x) := [1; x]
S := linfit(T, Pmn, F)
f(x) := F(x)*S
# annotation to a formula above: Fitting data to a logarithmic model.
S = [-218.873; 4.90228]
Pmnras(x) := S[1] + S[2]*x
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# Случайная абсолютн. погрешность
ΔP_slu := 2.776*sqrt(sum((Pmnras(T[i]) - Pmn[i])^2, i = n2 .. n3)/((n3 - n2 + 1)*(n3 - n2))) = 0.128194  # МПа
# Случайная относитн. погрешность
δP := ΔP_slu*100/P_mncp = 1.08632  # %
# 1. Дайте определение метода пьезометра постоянного объема для определения плотности жидкости в произвольной форме, при этом перечислите  все необходимые и достаточные ИЗМЕРИТЕЛЬНЫЕ  И  РЕЖИМНЫЕ  ДЕЙСТВИЯ
# Метод пьезометра постоянного объема заключается в том, что в течении всего эксперимента
# нам исвестен объем и масса исследуемого вещества.
#
# Последовательность необходимых (режимных) дейсвий:
# заполнение пьезометро исследуемой жидкостью
# нагрев пьезометра до заданной температуры Т
# поддержание заданной температуры Т
# давление превышает барометрическое
# измерение в пьезометре параметров вещества (давление и температура)
# выпуск вещества в жидкой фазе из пьезометра в колбу
# измерение массы выпущенной жидкости
#
# Измерительные действия:
# 1)Запись начальных условий (барометричнское давление и температура окружающей среды)
# 2)Измерение массы пустой колбы
# 3)Контроль температуры в пьезометре с помощью платинового термометра сопротивления (запись напряжения термометра)
# 4)Измерение давления в пьезометре с помощью манометра МИДА (запись напряжения манометра)
# Запись значений напряжения катушки
# 5)Измерение массы колбы с веществом после выпусков
# Запись времени шагов эксперимента
#
# Необходимо внести поправку на изменение объема пьезометра в результате изменения температуры и давления и поправку при измерении массы выпущенной жидкости.
#
# 21 05.02  уст. 1.
# Приведите численные результаты, которые получены с помощью всех необходимых действий- измерений. Эти действия вы внесли в свое определение метода и вычислили v= 1.0099077*10^-3
# 1)
# Численные результаты будут приведены только для 1 результата из серии
# 2 )
# Условия опыта
P_δap := 747  # мм.рт.ст
T_o := 24  # C
# 3 )
# Масса пустой колбы
M_k1 := 67.5979  # г
# Масса колбы с водой
M_kp1 := 180.3925  # г
# 4)
# Температура в пьезометра
T[1] = 46.8234  # C
# 5)
# Избыточное давление
Pmn[1] = 10.8735  # МПа
# Подставляем в расчетные формулы измеренные величины
ΔM_δo := (ρ - ρ_o)*V_δo = 6.96686e-5  # кг
# Поправка на барическую деформацию | для первого измерения
ΔV_P := β*(Pa*10^6 - 1)*V_o = 2.34803e-8  # м^3
# Поправка на термическую деформацию | для первого измерения
ΔV_T := 3*αt*(T[1] - 293.15 + 273.15)*V_o = 1.52282e-7  # м^3
M_OCT == V_o/ρ_para  # где
ρ_para := 0.5779  # - плотность водяного пара при Т=100 С и Р=746 мм. рт. ст. или 1.014 кгс/см^2
# Определяем удельный объем воды
v(Pa, Tcp) := (V_o + ΔV_P + ΔV_T)/(M_b*10^-3 - ΔM_δo + M_OCT)
v(Pa, Tcp) = 0.00101008  # м^3/кг
# значение другое, так как представленный ход действий воспроизводился только для первого измерения серии, при  расчете средних величин мы исключаем случайную погрешность.
# 21 05.02  уст. 1.
# Оценка 5
