ORIGIN := 1
# Цель работы: Ознакомиться с одним из методом экспериментального определения коэффициента теплопроводности газов и жидкостей.
# Метод нагретой проволоки.
# Идея метода заключается в следующем: вдоль оси цилиндра, представляющего собой металлическую трубку 1, заполненную исследуемым веществом, натянута проволока 2, которая является одновременно нагревателем и термометром сопротивления.Рабочая длина проволоки ограничена потенциальными отводами 3. Температура поверхности цилиндра поддерживается постоянной с помощью термостата 4.Пропуская по проволоке электрический ток, получим в установившемся режиме некоторое значение температуры проволоки Т_п. Количество тепла Q выделяемое при этом рабочим участком проволоки, будет передаваться стенке трубки через слой исследуемого вещества теплопроводностью Q_λ и излучением Q_л. Часть тепла будет отводится подводящими и потенциальными проводами Q_к. Такким образом, полное количество тепла, выделяемое проволокой, можно записать в виде суммы
Q == Q_λ + Q_l + Q_k
# Количество тепла, передаваемое теплопроводностью, можно определить измеряя полное количество тепла Q и вычитая из него Q_л и Q_к, рассчитываемые в виде  поправок.
#
# В соответствие с законом Фурье количество тепла передаваемое теплопроводностью через слой исследуемого вещества
λ(T) == A*d/dT(Q_λ(T_n))
Q_λ == 2*π*l/ln(d_tp/d_n)*integral(λ(T), T = T_ct .. T_n)
A == ln(d_tp/d_n)/(2*π*l)
# Устанавливая ряд последовательных значений эл. тока при неизменной температуре стенки трубки и определяя Qλ и Тп при каждом значении эл. тока, получаем зависимость Qλ(Tп). Такая зависимость может быть представлена в виде полинома
Q_λ == a_0 + a_1*T_n + a_2*T_n^2 + ....
# Дифференцируя это выражение, получаем формулу для λ в интервале температур от Тст до Тп в виде
λ(T) == A*(a_1 + a_2*T_n + .....)
# Протокол измерений.
B := 740  # мм рт. ст.  # Тком=25 оС
# Этап 1 (температура термостата)
# Стеклянный ртутный термометр
# Твх=Твых=31 оC
# Режим 1
# Напряжение на нити | Напряжение на катушке | ТермоЭДС термопар
Iist := 150*10^-3  # А
U1_n := [72.0950; 72.0970; 72.1010; 72.1045; 72.1060]*10^-3
U1_k := [149.690; 149.700; 149.707; 149.704; 149.706]*10^-3
E1_vx := [1.7725; 1.7728; 1.7733; 1.7736; 1.7740]
E1_vix := [1.8045; 1.8050; 1.8055; 1.8060; 1.8065]
# Режим 2
Iist := 170*10^-3  # А
Iist := 200*10^-3
U2_n := [96.3295; 96.3300; 96.3310; 96.3314; 96.3318]*10^-3
U2_k := [199.550; 199.547; 199.543; 199.540; 199.530]*10^-3
E2_vx := [1.8235; 1.8238; 1.8240; 1.8243; 1.8245]
E2_vix := [1.8525; 1.8529; 1.8532; 1.8535; 1.8237]
# Режим 3
Iist := 250*10^-3  # А
U3_n := [120.560; 120.570; 120.575; 120.580; 120.585]*10^-3
U3_k := [249.150; 249.045; 249.035; 249.135; 249.140]*10^-3
E3_vx := [1.8495; 1.8499; 1.8500; 1.8505; 1.8510]
E3_vix := [1.8780; 1.8784; 1.8790; 1.8794; 1.8796]
R_o := 1.0  # Om
A := 2.78
# Рабочий ток
I1 := U1_k/R_o
I2 := U2_k/R_o
I3 := U3_k/R_o
# Электрическая мощность
Q1_λ := vectorize(U1_n*I1)
Q2_λ := vectorize(U2_n*I2)
Q3_λ := vectorize(U3_n*I3)
# Сопротивление рабочего участка нити
R1_n := vectorize(U1_n/I1)
R2_n := vectorize(U2_n/I2)
R3_n := vectorize(U3_n/I3)
# Температура проволоки по градуировочному уравнению
T1_n := -271.93 + 795.9*R1_n - 345.1*vectorize(R1_n^2)
T2_n := vectorize(-271.93 + 795.9*R2_n - 345.1*R2_n^2)
T3_n := vectorize(-271.93 + 795.9*R3_n - 345.1*R3_n^2)
Q1_cp := 1/5*sum(Q1_λ[i], i = 1 .. 5)
Q2_cp := 1/5*sum(Q2_λ[i], i = 1 .. 5)
Q3_cp := 1/5*sum(Q3_λ[i], i = 1 .. 5)
Q := [Q1_cp; Q2_cp; Q3_cp]
T1_n = [31.3467; 31.338; 31.34; 31.3553; 31.3569]
T1стек := [31; 31; 31; 31; 31]
Q = [0.0107936; 0.019222; 0.0300351]
T1_cp := 1/5*sum(T1_n[i], i = 1 .. 5)
T2_cp := 1/5*sum(T2_n[i], i = 1 .. 5)
T2стек := [31; 31; 31; 31; 31]
T2_n = [31.8584; 31.863; 31.8698; 31.874; 31.8862]
T3_cp := 1/5*sum(T3_n[i], i = 1 .. 5)
T3_n = [32.3908; 32.5036; 32.5218; 32.4414; 32.4462]
T3стек := [31; 31; 31; 31; 31]
T_n := [T1_cp; T2_cp; T3_cp]
T_n = [31.3474; 31.8703; 32.4608]  # C
# Средний рабочий ток
I1_cp := 1/5*sum(I1[i], i = 1 .. 5)
I2_cp := 1/5*sum(I2[i], i = 1 .. 5)
I3_cp := 1/5*sum(I3[i], i = 1 .. 5)
I := [I1_cp; I2_cp; I3_cp]
I = [0.149701; 0.199542; 0.249101]  # A
I2 = [0.19955; 0.199547; 0.199543; 0.19954; 0.19953]  # A
I3 = [0.24915; 0.249045; 0.249035; 0.249135; 0.24914]  # A
I1 = [0.14969; 0.1497; 0.149707; 0.149704; 0.149706]  # A
# Интерполируем зависимость Q(λ)
Q(T) == a_o + a_1*T
G := [3, sum(T_n[i], i = 1 .. 3); sum(T_n[i], i = 1 .. 3), sum(T_n[i]^2, i = 1 .. 3)]
K := [sum(Q[i], i = 1 .. 3); sum(Q[i]*T_n[i], i = 1 .. 3)]
V := G^-1*K
V = [-0.531868; 0.0173044]
a_o := V[1] = -0.531868
a_1 := V[2] = 0.0173044
j := 1 .. 3
T := 28.0, 28.5 .. 34.5
Ts := T_n
Q = [0.0107936; 0.019222; 0.0300351]
Ts[j] = [31.3474; 31.8703; 32.4608]
Q_o(T) := a_o + a_1*T
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λ(T) := A*a_1
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λa := A*a_1 = 0.0481061
λ_1 := A*(Q[2] - Q[1])/(T_n[2] - T_n[1])
λ_1 = 0.0448113  # Вт/мК
λ_2 := A*(Q[3] - Q[1])/(T_n[3] - T_n[1])
λ_2 = 0.0480447  # Вт/мК
λ_3 := A*(Q[3] - Q[2])/(T_n[3] - T_n[2])
λ_3 = 0.050908  # Вт/мК
# Локальные отклонения
d1 := (λ_1 - [λa])*100/λa = [-6.84909]  # %
d2 := (λ_2 - [λa])*100/λa = [-0.127619]  # %
d3 := (λ_3 - [λa])*100/λa = [5.82436]  # %
# Расчет утечек тепла по приложению в лабнике.
# 1.
c_1 := 1.744*10^-7
c_2 := 2.011*10^-9
c_3 := 2.056*10^-6
c_4 := 2.056*10^-4
c_5 := 1.376*10^-4
q_k := vectorize(I^2*c_3/(sqrt(λ(T_n))*sqrt(c_1 - I^2/λ(T_n)*c_2)*(c_5*sqrt(c_1 - I^2/λ(T_n)*c_2) + 1)))
j := 2 .. 3  # Утечки по проводящим проводам в режимах 2-3
q_k[j] = [0.00089805; 0.00140331]
λ(T_n) = 0.0481061
T_n = [31.3474; 31.8703; 32.4608]
# 2. Утечки на излучение в режимах 2-3
q_l := 6*10^-2*5.67*10^-8*93.74*10^-6*vectorize((T_n/100)^4 - (49.0/100)^4)
q_l = [-1.53048e-14; -1.50941e-14; -1.48434e-14]
# Расчет погрешностей.
ΔA := 0.005
Δλ == sqrt((d/dA(λ))^2*ΔA^2 + (d/d(Q_1 - Q_2)(λ))^2*Δ(Q_1 - Q_2)^2 + (d/d(T_1 - T_2)(λ))^2*Δ(T_1 - T_2)^2)
d/d(Q_1 - Q_2)(λ) == L_1 == A/(T_2 - T_1)
d/dA(λ) == L_2 == (Q_2 - Q_1)/(T_2 - T_1)
d/d(T_1 - T_2)(λ) == L_3 == -A*(Q_2 - Q_1)/(T_2 - T_1)^2
Δ(Q_1 - Q_2) == ΔQ_1 + ΔQ_2 == Δ_1
Δ(T_1 - T_2) == ΔT_1 + ΔT_2 == Δ_2
ΔU_k[1] := 2.77*sqrt(sum((sum(1/5*U1_k[i], i = 1 .. 5) - U1_k[i])^2, i = 1 .. 5)/(5*(5 - 1))) = 8.56463e-6
ΔU_k[2] := 2.77*sqrt(sum((sum(1/4*U2_k[i], i = 1 .. 5) - U2_k[i])^2, i = 1 .. 5)/(5*(5 - 1))) = 0.0690914
ΔU_k[3] := 2.77*sqrt(sum((1/5*sum(U3_k[i], i = 1 .. 5) - U3_k[i])^2, i = 1 .. 5)/(5*(5 - 1))) = 6.94436e-5
U_k := [sum(1/5*U1_k[i], i = 1 .. 5); sum(1/5*U2_k[i], i = 1 .. 5); sum(1/5*U3_k[i], i = 1 .. 5)] = [0.149701; 0.199542; 0.249101]
δU_k := vectorize(ΔU_k/U_k)
δU_k = [5.72114e-5; 0.34625; 0.000278777]
ΔU_n[1] := 2.77*sqrt(sum((sum(1/5*U1_n[i], i = 1 .. 5) - U1_n[i])^2, i = 1 .. 5)/(5*(5 - 1))) = 5.83675e-6
ΔU_n[2] := 2.77*sqrt(sum((sum(1/5*U2_n[i], i = 1 .. 5) - U2_n[i])^2, i = 1 .. 5)/(5*(5 - 1))) = 1.19335e-6
ΔU_n[3] := 2.77*sqrt(sum((sum(1/5*U3_n[i], i = 1 .. 5) - U3_n[i])^2, i = 1 .. 5)/(5*(5 - 1))) = 1.19142e-5
U_n := [sum(1/5*U1_n[i], i = 1 .. 5); sum(1/5*U2_n[i], i = 1 .. 5); sum(1/5*U3_n[i], i = 1 .. 5)] = [0.0721007; 0.0963307; 0.120574]
δU_n := vectorize(ΔU_n/U_n)
δU_n = [8.09528e-5; 1.23881e-5; 9.88125e-5]
ΔQ == Q*sqrt(δU_k^2 + δU_n^2 + 0.0001^2)
ΔT == |759.9 - 2*345*R_n|*R_n*sqrt(δU_k^2 + δU_n^2 + 0.0001^2)
R_n := [sum(1/5*R1_n[i], i = 1 .. 5); sum(1/5*R2_n[i], i = 1 .. 5); sum(1/5*R3_n[i], i = 1 .. 5)]
Δ1 := vectorize(|759.9 - 2*345*R_n|*R_n*sqrt(δU_k^2 + δU_n^2 + 0.0001^2))
Δ2 := vectorize(Q*sqrt(δU_k^2 + δU_n^2 + 0.0001^2))
R_n = [0.48163; 0.482759; 0.484037]
Δ_2 := 2*Δ1
Δ_1 := Q[1]*sqrt(δU_k[1]^2 + δU_n[1]^2 + 0.0001^2) + Δ2
L_1[1] := A/(T_n[2] - T_n[1])
L_1[2] := A/(T_n[3] - T_n[1])
L_1[3] := A/(T_n[3] - T_n[2])
Δ1 = [0.0289967; 71.3413; 0.0643665]
L_2[1] := (Q[2] - Q[1])/(T_n[2] - T_n[1])
L_2[2] := (Q[3] - Q[1])/(T_n[3] - T_n[1])
L_2[3] := (Q[3] - Q[2])/(T_n[3] - T_n[2])
Δ_2 = [0.0579935; 142.683; 0.128733]
L_3[1] := A*(Q[2] - Q[1])/(T_n[2] - T_n[1])^2
L_3[2] := A*(Q[3] - Q[1])/(T_n[3] - T_n[1])^2
L_3[3] := A*(Q[3] - Q[2])/(T_n[3] - T_n[2])^2
Δ_1 = [3.03961e-6; 0.00665715; 1.08973e-5]
Δλ := vectorize(sqrt(L_2^2*ΔA^2 + L_1^2*Δ_1^2 + L_3^2*Δ_2^2))
Δ_2 = [0.0579935; 142.683; 0.128733]
L_1^2*Δ_1^2 = 0.000276308
L_2^2*ΔA^2 = [6.49569e-9; 7.46693e-9; 8.38344e-9]
L_3^2*Δ_2^2 = 37.9103
λ := [λ_1; λ_2; λ_3]
Δλ = [0.00497074; 6.15715; 0.0110991]
L_2 = [0.0161192; 0.0172823; 0.0183122]
L_3 = [0.0857003; 0.0431526; 0.086214]
j := 1 .. 3
δλ := vectorize(100*Δλ/λ)
δλ = [11.0926; 12815.4; 21.8022]
λ = [0.0448113; 0.0480447; 0.050908]
# Этап 2 (температура термостата)
# Стеклянный ртутный термометр
# Режим 1 | Твх=Твых=40 оС
Iist := 150*10^-3  # А
U1_n := [75.3470; 75.3465; 75.3455; 75.3440; 75.3435]*10^-3
U1_k := [149.635; 149.640; 149.650; 149.655; 149.653]*10^-3
E1_vx := [2.4485; 2.4483; 2.4477; 2.4478; 2.4469]
E1_vix := [2.4670; 2.4670; 2.4665; 2.4660; 2.4657]
# Режим 2
Iist := 200*10^-3
U2_n := [100.4895; 100.4885; 100.4872; 100.4858; 100.4842]*10^-3
U2_k := [199.524; 199.515; 199.510; 199.506; 199.494]*10^-3
E2_vx := [2.4400; 2.4393; 2.4388; 2.4387; 2.4385]
E2_vix := [2.4585; 2.4580; 2.4578; 2.4575; 2.4573]
# Режим 3
Iist := 250*10^-3
U3_n := [125.545; 125.550; 125.565; 125.550; 125.545]*10^-3
U3_k := [249.190; 249.198; 249.202; 249.200; 249.201]*10^-3
E3_vx := [2.4320; 2.4316; 2.4311; 2.4308; 2.4305]
E3_vix := [2.4477; 2.4475; 2.4474; 2.4473; 2.4472]
R_o := 1.0  # Om
A := 2.78
# Твх=Твых=40 оС
# Рабочий ток
I1 := U1_k/R_o
I2 := U2_k/R_o
I3 := U3_k/R_o
# Электрическая мощность
Q1_λ := vectorize(U1_n*I1)
Q2_λ := vectorize(U2_n*I2)
Q3_λ := vectorize(U3_n*I3)
# Сопротивление рабочего участка нити
R1_n := vectorize(U1_n/I1)
R2_n := vectorize(U2_n/I2)
R3_n := vectorize(U3_n/I3)
# Температура проволоки по градуировочному уравнению
T1_n := vectorize(-271.93 + 795.9*R1_n - 345*R1_n^2)
T2_n := vectorize(-271.93 + 795.9*R2_n - 345*R2_n^2)
T3_n := vectorize(-271.93 + 795.9*R3_n - 345*R3_n^2)
T1_n = [41.3612; 41.3522; 41.3341; 41.3221; 41.3236]
Q1_cp := 1/5*sum(Q1_λ[i], i = 1 .. 5)
Q2_cp := 1/5*sum(Q2_λ[i], i = 1 .. 5)
Q3_cp := 1/5*sum(Q3_λ[i], i = 1 .. 5)
T2_n = [41.4095; 41.4174; 41.4202; 41.4215; 41.4315]
T3_n = [41.484; 41.4857; 41.5091; 41.4839; 41.474]
Q = [0.0107936; 0.019222; 0.0300351]
Q := [Q1_cp; Q2_cp; Q3_cp]
T1_cp := 1/5*sum(T1_n[i], i = 1 .. 5)
T2_cp := 1/5*sum(T2_n[i], i = 1 .. 5)
T3_cp := 1/5*sum(T3_n[i], i = 1 .. 5)
T_n := [T1_cp; T2_cp; T3_cp]
T_n = [41.3386; 41.42; 41.4873]  # C
# Средний рабочий ток
I1_cp := 1/5*sum(I1[i], i = 1 .. 5)
I2_cp := 1/5*sum(I2[i], i = 1 .. 5)
I3_cp := 1/5*sum(I3[i], i = 1 .. 5)
I := [I1_cp; I2_cp; I3_cp]
I = [0.149647; 0.19951; 0.249198]  # A
# Интерполируем зависимость Q(λ)
Q(T) == a_o + a_1*T
G := [3, sum(T_n[i], i = 1 .. 3); sum(T_n[i], i = 1 .. 3), sum(T_n[i]^2, i = 1 .. 3)]
K := [sum(Q[i], i = 1 .. 3); sum(Q[i]*T_n[i], i = 1 .. 3)]
V := G^-1*K
V = [-5.51475; 0.133661]
a_o := V[1]
a_1 := V[2]
j := 1 .. 3
Ts := T_n
Q = [0.0112752; 0.0200481; 0.0312871]
Ts[j] = [41.3386; 41.42; 41.4873]
T := 35, 38.5 .. 44
Q_o(T) := a_o + a_1*T
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λ(T) := A*a_1
λa := A*a_1 = 0.371578
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λ_1 := A*(Q[2] - Q[1])/(T_n[2] - T_n[1])
λ_1 = 0.299694  # Вт/мК
λ_2 := A*(Q[3] - Q[1])/(T_n[3] - T_n[1])
λ_2 = 0.374139  # Вт/мК
λ_3 := A*(Q[3] - Q[2])/(T_n[3] - T_n[2])
λ_3 = 0.464135  # Вт/мК
# Относительные локальные отклонения dλ
d1 := (λ_1 - [λa])*100/λa = [-19.3456]  # %
d2 := (λ_2 - [λa])*100/λa = [0.68924]  # %
d3 := (λ_3 - [λa])*100/λa = [24.9093]  # %
# Расчет утечек тепла по приложению в лабнике.
c_1 := 1.744*10^-7
c_2 := 2.011*10^-9
c_3 := 2.056*10^-6
c_4 := 2.056*10^-4
c_5 := 1.376*10^-4
q_k := vectorize(I^2*c_3/(sqrt(λ(T_n))*sqrt(c_1 - I^2/λ(T_n)*c_2)*(c_5*sqrt(c_1 - I^2/λ(T_n)*c_2) + 1)))
j := 2 .. 3  # Утечки по проводящим проводам в режимах 2-3
q_k[j] = [0.000321678; 0.000502034]
λ(T_n) = 0.371578
T_n = [41.3386; 41.42; 41.4873]
# 2. Утечки на излучение в режимах 2-3
q_l := 6*10^-2*5.67*10^-8*93.74*10^-6*vectorize((T_n/100)^4 - (49.0/100)^4)
q_l = [-9.07127e-15; -8.99772e-15; -8.93655e-15]
# Расчет погрешностей.
ΔA := 0.005
Δλ == sqrt((d/dA(λ))^2*ΔA^2 + (d/d(Q_1 - Q_2)(λ))^2*Δ(Q_1 - Q_2)^2 + (d/d(T_1 - T_2)(λ))^2*Δ(T_1 - T_2)^2)
d/d(Q_1 - Q_2)(λ) == L_1 == A/(T_2 - T_1)
d/dA(λ) == L_2 == (Q_2 - Q_1)/(T_2 - T_1)
d/d(T_1 - T_2)(λ) == L_3 == -A*(Q_2 - Q_1)/(T_2 - T_1)^2
Δ(Q_1 - Q_2) == ΔQ_1 + ΔQ_2 == Δ_1
Δ(T_1 - T_2) == ΔT_1 + ΔT_2 == Δ_2
ΔU_k[1] := 2.77*sqrt(sum((sum(1/5*U1_k[i], i = 1 .. 5) - U1_k[i])^2, i = 1 .. 5)/(5*(5 - 1))) = 1.07496e-5
ΔU_k[2] := 2.77*sqrt(sum((sum(1/5*U2_k[i], i = 1 .. 5) - U2_k[i])^2, i = 1 .. 5)/(5*(5 - 1))) = 1.37499e-5
ΔU_k[3] := 2.77*sqrt(sum((sum(1/5*U3_k[i], i = 1 .. 5) - U3_k[i])^2, i = 1 .. 5)/(5*(5 - 1))) = 5.96676e-6
U_k := [sum(1/5*U1_k[i], i = 1 .. 5); sum(1/5*U2_k[i], i = 1 .. 5); sum(1/5*U3_k[i], i = 1 .. 5)] = [0.149647; 0.19951; 0.249198]
δU_k := vectorize(ΔU_k/U_k)
δU_k = [7.18332e-5; 6.89185e-5; 2.39438e-5]
ΔU_n[1] := 2.77*sqrt(sum((sum(1/4*U1_n[i], i = 1 .. 5) - U1_n[i])^2, i = 1 .. 5)/(5*(5 - 1))) = 0.0260883
ΔU_n[2] := 2.77*sqrt(sum((sum(1/5*U2_n[i], i = 1 .. 5) - U2_n[i])^2, i = 1 .. 5)/(5*(5 - 1))) = 2.61409e-6
ΔU_n[3] := 2.77*sqrt(sum((sum(1/5*U3_n[i], i = 1 .. 5) - U3_n[i])^2, i = 1 .. 5)/(5*(5 - 1))) = 1.01776e-5
U_n := [sum(1/5*U1_n[i], i = 1 .. 5); sum(1/5*U2_n[i], i = 1 .. 5); sum(1/5*U3_n[i], i = 1 .. 5)] = [0.0753453; 0.100487; 0.125551]
δU_n := vectorize(ΔU_n/U_n)
δU_n = [0.34625; 2.60142e-5; 8.10637e-5]
ΔQ == Q*sqrt(δU_k^2 + δU_n^2 + 0.0001^2)
ΔT == |759.9 - 2*345*R_n|*R_n*sqrt(δU_k^2 + δU_n^2 + 0.0001^2)
R_n := [sum(1/5*R1_n[i], i = 1 .. 5); sum(1/5*R2_n[i], i = 1 .. 5); sum(1/5*R3_n[i], i = 1 .. 5)]
Δ1 := vectorize(|759.9 - 2*345*R_n|*R_n*sqrt(δU_k^2 + δU_n^2 + 0.0001^2))
Δ2 := vectorize(Q*sqrt(δU_k^2 + δU_n^2 + 0.0001^2))
Δ_2 := 2*Δ1
Δ_1 := 2*Δ2
L_1[1] := A/(T_n[2] - T_n[1])
L_1[2] := A/(T_n[3] - T_n[1])
L_1[3] := A/(T_n[3] - T_n[2])
L_2[1] := (Q[2] - Q[1])/(T_n[2] - T_n[1])
L_2[2] := (Q[3] - Q[1])/(T_n[3] - T_n[1])
L_2[3] := (Q[3] - Q[2])/(T_n[3] - T_n[2])
L_3[1] := A*(Q[2] - Q[1])/(T_n[2] - T_n[1])^2
L_3[2] := A*(Q[3] - Q[1])/(T_n[3] - T_n[1])^2
L_3[3] := A*(Q[3] - Q[2])/(T_n[3] - T_n[2])^2
λ := [λ_1; λ_2; λ_3]
j := 1 .. 3
Δλ := vectorize(sqrt(L_2^2*ΔA^2 + L_1^2*Δ_1^2 + L_3^2*Δ_2^2))
δλ := vectorize(Δλ*100/λ)
Δλ[j] = [529.651; 0.129817; 0.37503]
δλ[j] = [176731; 34.6976; 80.8018]
# Этап 3 (температура термостата)
# Режим 1
Iist := 150*10^-3
E1_vix := [2.9500; 2.9503; 2.9505; 2.9507; 2.9506]
U1_n := [77.8950; 77.8940; 77.8932; 77.8924; 77.8912]*10^-3
U1_k := [149.650; 149.660; 149.665; 149.663; 149.670]*10^-3
E1_vx := [2.9330; 2.9325; 2.9323; 2.9317; 2.9314]
# Режим 2
Iist := 200*10^-3
U2_n := [103.8800; 103.8770; 103.8764; 103.8755; 103.8748]*10^-3
U2_k := [199.560; 199.557; 199.558; 199.556; 199.560]*10^-3
E2_vx := [2.9256; 2.9260; 2.9264; 2.9265; 2.9265]
E2_vix := [2.9460; 2.9458; 2.9456; 2.9451; 2.949]
# Режим 3
Iist := 250*10^-3
U3_n := [129.780; 129.782; 129.781; 129.779; 129.777]*10^-3
U3_k := [249.310; 249.315; 249.320; 249.323; 249.326]*10^-3
E3_vx := [2.9104; 2.9101; 2.9096; 2.9090; 2.9091]
E3_vix := [2.9285; 2.9284; 2.9280; 2.9275; 2.9268]
R_o := 1.0  # Om
A := 2.78
# Твх=Твых=48 оС
# Рабочий ток
I1 := U1_k/R_o
I2 := U2_k/R_o
I3 := U3_k/R_o
# Электрическая мощность
Q1_λ := vectorize(U1_n*I1)
Q2_λ := vectorize(U2_n*I2)
Q3_λ := vectorize(U3_n*I3)
# Сопротивление рабочего участка нити
R1_n := vectorize(U1_n/I1)
R2_n := vectorize(U2_n/I2)
R3_n := vectorize(U3_n/I3)
# Температура проволоки по градуировочному уравнению
T1_n := vectorize(-271.93 + 795.9*R1_n - 345*R1_n^2)
T2_n := vectorize(-271.93 + 795.9*R2_n - 345*R2_n^2)
T3_n := vectorize(-271.93 + 795.9*R3_n - 345*R3_n^2)
Q1_cp := 1/5*sum(Q1_λ[i], i = 1 .. 5)
Q2_cp := 1/5*sum(Q2_λ[i], i = 1 .. 5)
Q3_cp := 1/5*sum(Q3_λ[i], i = 1 .. 5)
Q := [Q1_cp; Q2_cp; Q3_cp]
Q = [0.0116576; 0.0207295; 0.0323565]
T1_n = [48.8748; 48.8567; 48.8468; 48.8475; 48.8333]
T3_cp := 1/5*sum(T3_n[i], i = 1 .. 5)
T1_cp := 1/5*sum(T1_n[i], i = 1 .. 5)
T2_cp := 1/5*sum(T2_n[i], i = 1 .. 5)
T_n := [T1_cp; T2_cp; T3_cp]
T_n = [48.8518; 48.8831; 48.8849]  # C
T2_n = [48.8882; 48.8851; 48.8826; 48.8829; 48.8768]
# Средний рабочий ток
I1_cp := 1/5*sum(I1[i], i = 1 .. 5)
I2_cp := 1/5*sum(I2[i], i = 1 .. 5)
I3_cp := 1/5*sum(I3[i], i = 1 .. 5)
T3_n = [48.8932; 48.8922; 48.8859; 48.8796; 48.8734]
I = [0.149647; 0.19951; 0.249198]  # A
I := [I1_cp; I2_cp; I3_cp]
# Интерполируем зависимость Q(λ)
Q(T) == a_o + a_1*T
G := [3, sum(T_n[i], i = 1 .. 3); sum(T_n[i], i = 1 .. 3), sum(T_n[i]^2, i = 1 .. 3)]
K := [sum(Q[i], i = 1 .. 3); sum(Q[i]*T_n[i], i = 1 .. 3)]
V := G^-1*K
V = [-23.2586; 0.476337]
a_o := V[1]
a_1 := V[2]
j := 1 .. 3
Ts := T_n
T := 47, 47.5 .. 50
Q = [0.0116576; 0.0207295; 0.0323565]
Q_o(T) := a_o + a_1*T
Ts = [48.8518; 48.8831; 48.8849]
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λ(T) := A*a_1
λa := A*a_1 = 1.32422
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λ_1 := A*(Q[2] - Q[1])/(T_n[2] - T_n[1])
λ_1 = 0.805765  # Вт/мК
λ_2 := A*(Q[3] - Q[1])/(T_n[3] - T_n[1])
λ_2 = 1.74125  # Вт/мК
λ_3 := A*(Q[3] - Q[2])/(T_n[3] - T_n[2])
λ_3 = 18.4924  # Вт/мК
# Относительные локальные  отклонения dλ
d1 := (λ_1 - [λa])*100/λa = [-39.1516]  # %
d2 := (λ_2 - [λa])*100/λa = [31.4925]  # %
d3 := (λ_3 - [λa])*100/λa = [1296.47]  # %
# Расчет утечек тепла по приложению в лабнике.
c_1 := 1.744*10^-7
c_2 := 2.011*10^-9
c_3 := 2.056*10^-6
c_4 := 2.056*10^-4
c_5 := 1.376*10^-4
q_k := vectorize(I^2*c_3/(sqrt(λ(T_n))*sqrt(c_1 - I^2/λ(T_n)*c_2)*(c_5*sqrt(c_1 - I^2/λ(T_n)*c_2) + 1)))
j := 2 .. 3  # Утечки по проводящим проводам в режимах 2-3
λ(T_n) = 1.32422
q_k = [9.58371e-5; 0.000170406; 0.00026601]
T_n = [48.8518; 48.8831; 48.8849]
# 2. Утечки на излучение в режимах 2-3
q_l := 6*10^-2*5.67*10^-8*93.74*10^-6*vectorize((T_n/100)^4 - (49.0/100)^4)
# Расчет погрешностей.
ΔA := 0.005
Δλ == sqrt((d/dA(λ))^2*ΔA^2 + (d/d(Q_1 - Q_2)(λ))^2*Δ(Q_1 - Q_2)^2 + (d/d(T_1 - T_2)(λ))^2*Δ(T_1 - T_2)^2)
d/d(Q_1 - Q_2)(λ) == L_1 == A/(T_2 - T_1)
d/dA(λ) == L_2 == (Q_2 - Q_1)/(T_2 - T_1)
d/d(T_1 - T_2)(λ) == L_3 == -A*(Q_2 - Q_1)/(T_2 - T_1)^2
Δ(Q_1 - Q_2) == ΔQ_1 + ΔQ_2 == Δ_1
Δ(T_1 - T_2) == ΔT_1 + ΔT_2 == Δ_2
ΔU_k[1] := 2.77*sqrt(sum((sum(1/5*U1_k[i], i = 1 .. 5) - U1_k[i])^2, i = 1 .. 5)/(5*(5 - 1))) = 9.21207e-6
ΔU_k[2] := 2.77*sqrt(sum((sum(1/5*U2_k[i], i = 1 .. 5) - U2_k[i])^2, i = 1 .. 5)/(5*(5 - 1))) = 2.216e-6
ΔU_k[3] := 2.77*sqrt(sum((sum(1/5*U3_k[i], i = 1 .. 5) - U3_k[i])^2, i = 1 .. 5)/(5*(5 - 1))) = 7.903e-6
U_k := [sum(1/5*U1_k[i], i = 1 .. 5); sum(1/5*U2_k[i], i = 1 .. 5); sum(1/5*U3_k[i], i = 1 .. 5)] = [0.149662; 0.199558; 0.249319]
δU_k := vectorize(ΔU_k/U_k)
δU_k = [6.15527e-5; 1.11045e-5; 3.16984e-5]
ΔU_n[1] := 2.77*sqrt(sum((sum(1/5*U1_n[i], i = 1 .. 5) - U1_n[i])^2, i = 1 .. 5)/(5*(5 - 1))) = 1.80709e-6
ΔU_n[2] := 2.77*sqrt(sum((sum(1/5*U2_n[i], i = 1 .. 5) - U2_n[i])^2, i = 1 .. 5)/(5*(5 - 1))) = 2.48622e-6
ΔU_n[3] := 2.77*sqrt(sum((sum(1/5*U3_n[i], i = 1 .. 5) - U3_n[i])^2, i = 1 .. 5)/(5*(5 - 1))) = 2.38284e-6
U_n := [sum(1/5*U1_n[i], i = 1 .. 5); sum(1/5*U2_n[i], i = 1 .. 5); sum(1/5*U3_n[i], i = 1 .. 5)] = [0.0778932; 0.103877; 0.12978]
δU_n := vectorize(ΔU_n/U_n)
δU_n = [2.31996e-5; 2.39343e-5; 1.83607e-5]
ΔQ == Q*sqrt(δU_k^2 + δU_n^2 + 0.0001^2)
ΔT == |759.9 - 2*345*R_n|*R_n*sqrt(δU_k^2 + δU_n^2 + 0.0001^2)
R_n := [sum(1/5*R1_n[i], i = 1 .. 5); sum(1/5*R2_n[i], i = 1 .. 5); sum(1/5*R3_n[i], i = 1 .. 5)] = [0.520462; 0.520534; 0.520538]
Δ1 := vectorize(|759.9 - 2*345*R_n|*R_n*sqrt(δU_k^2 + δU_n^2 + 0.0001^2))
Δ2 := vectorize(Q*sqrt(δU_k^2 + δU_n^2 + 0.0001^2))
Δ_2 := 2*Δ1
Δ_1 := 2*Δ2
L_1[1] := A/(T_n[2] - T_n[1])
L_1[2] := A/(T_n[3] - T_n[1])
L_1[3] := A/(T_n[3] - T_n[2])
L_2[1] := (Q[2] - Q[1])/(T_n[2] - T_n[1])
L_2[2] := (Q[3] - Q[1])/(T_n[3] - T_n[1])
L_2[3] := (Q[3] - Q[2])/(T_n[3] - T_n[2])
L_3[1] := A*(Q[2] - Q[1])/(T_n[2] - T_n[1])^2
L_3[2] := A*(Q[3] - Q[1])/(T_n[3] - T_n[1])^2
L_3[3] := A*(Q[3] - Q[2])/(T_n[3] - T_n[2])^2
λ := [λ_1; λ_2; λ_3]
j := 1 .. 3
Δλ := vectorize(sqrt(L_2^2*ΔA^2 + L_1^2*Δ_1^2 + L_3^2*Δ_2^2))
Δλ = [1.28552; 2.27339; 470.05]
δλ := vectorize(Δλ*100/λ)
δλ = [159.541; 130.561; 2541.86]
