ORIGIN := 1
# ℃
Ec2 := [
    12.30; 10.64; 9.54; 9.55; 9.55; 9.55; 9.55; 9.55; 9.55; 9.55
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]  # мВ
Ep2 := [
    12.24; 10.53; 9.47; 9.47; 9.48; 9.48; 9.48; 9.48; 9.48; 9.48
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]  # мВ
Ec1 := [
    1.35; 2.00; 3.37; 4.73; 5.92; 7.00; 7.98; 8.85; 9.51; 9.53
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]  # мВ
Ep1 := [
    1.15; 1.90; 3.30; 4.66; 5.84; 6.92; 7.90; 8.78; 9.44; 9.45
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]  # мВ
# Градуировка:
Egr := [
    0; 0.40; 0.80; 1.20; 1.61; 2.02; 2.43; 2.85; 3.26; 3.68
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]  # мВ
Tgr := [
    0; 10; 20; 30; 40; 50; 60; 70; 80; 90
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]  # ℃
τ1 := [
    0; 2; 4; 6; 8; 10; 12; 14; 16; 18
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]  # мин
τ2 := [
    0; 2; 4; 4.5; 5; 5.5; 6; 6.5; 7; 7.5
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]  # мин
# Перевод значений эдс по градуировке в температуру
Perevod1(E, Egr, Tgr) :=
    for i ∈ 1 .. 50
        for j ∈ 1 .. 49
            T[i] ← Tgr[j] + (E[i] - Egr[j])*(Tgr[j + 1] - Tgr[j])/(Egr[j + 1] - Egr[j]) if Egr[j] ≤ E[i] ≤ Egr[j + 1]
    T
Tcentr1 := Perevod1(Ec1, Egr, Tgr)
Tperif1 := Perevod1(Ep1, Egr, Tgr)
Tperif1 = [
    28.75; 47.0732; 80.9524; 113.659; 142.75; 169.75; 194.25; 216.25; 232.5; 232.75
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]  # ℃
Tcentr1 = [
    33.6585; 49.5122; 82.619; 115.366; 144.75; 171.75; 196.25; 218; 234.25; 234.75
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]
# Тут в 1 for надо намисать размерность матрицы градуировки Еgr
Perevod2(E, Egr, Tgr) :=
    for i ∈ 1 .. 34
        for j ∈ 1 .. 49
            T[i] ← Tgr[j] + (E[i] - Egr[j])*(Tgr[j + 1] - Tgr[j])/(Egr[j + 1] - Egr[j]) if Egr[j] ≤ E[i] ≤ Egr[j + 1]
    T
Tcentr2 := Perevod2(Ec2, Egr, Tgr)
Tperif2 := Perevod2(Ep2, Egr, Tgr)
Tcentr2 = [
    302.195; 261.951; 235; 235.25; 235.25; 235.25; 235.25; 235.25; 235.25; 235.25
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]  # ℃
Tperif2 = [
    300.732; 259.268; 233.25; 233.25; 233.5; 233.5; 233.5; 233.5; 233.5; 233.5
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]  # ℃
# Термограмма олова:
i := 1 .. 50
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# Начало плавления | Конец плавления
τ1[14] = 18  # disabled  # мин
τ1[24] = 36, 5  # disabled  # мин
i := 1 .. 33
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# Начало кристаллизации | Конец кристаллизации
τ2[4] = 4  # disabled  # мин
τ2[18] := 17.8  # disabled  # мин
# Скорость падения температуры перед кристаллизацией:
dTpf := (Tperif2[1] - Tperif2[3])/((τ2[3] - τ2[1])*60) = 0.281174  # К/с
dTcf := (Tcentr2[1] - Tcentr2[3])/((τ2[3] - τ2[1])*60) = 0.27998  # К/с
# Скорость падения температуры после кристаллизацией:
dTps := (Tperif2[30] - Tperif2[33])/((τ2[33] - τ2[30])*60) = 0.126942  # К/с
dTсs := (Tcentr2[30] - Tcentr2[33])/((τ2[33] - τ2[30])*60) = 0.141667  # К/с
# Мощность теплоотдачи
# Массы (кг):
# Олова:  Тигля:
m := 0.555
mt := 0.048
# Удельные теплоёмкости (Дж/[кг*К])
# Жидкое олово  Тигль  Твёрдое олово
cpf := 245
cpt := 525
cps := 258
# Суммарные теплоёмкости (Дж/К):
Csums := cps*m + cpt*mt = 168.39
Csumf := cpf*m + cpt*mt = 161.175
# Мощности далее обозначаются буквой Q (размерность - Вт).
dQ' := Csumf*dTpf = 45.3182
dQ'' := Csums*dTсs = 23.8553
# Среднее значение мощности теплоотдачи
dQ := 1/2*(dQ' + dQ'') = 34.5867
# Удельная теплота плавления (кристаллизации)
L := dQ*(τ2[30] - τ2[3])*60/m = 51599.6  # Дж/кг
# Изменение температуры по переферийной части
i := 1 .. 2  # ω - изменение температуры по времени
ω[i] := (Tperif2[i + 1] - Tperif2[i])/((τ2[i + 1] - τ2[i])*60)
ω = [-0.345528; -0.216819]  # К/с
ωmaxp := 0.327  # К/с
ωminp := 0.217  # К/с
# Изменение температуры по центральной части
# ν - изменение температуры по времени
i := 1 .. 2  # ν - изменение температуры по времени
ν[i] := (Tcentr2[i + 30] - Tcentr2[i + 29])/((τ2[i + 30] - τ2[i + 29])*60)
ν = [-0.337398; -0.0469004]  # К/с
ωmaxc := 0.247  # К/с
ωminc := 0.171  # К/с
# Рассчитаем тепловые потери
dQmax := ωmaxp*Csums = 55.0635
dQmin := ωminc*Csums = 28.7947
# Средняя тепловая потеря
dQ3 := 1/2*(dQmax + dQmin) = 41.9291
# Средняя удельная теплота плавления
Lcr := dQ3*(τ2[30] - τ2[3])*60/m = 62553.7  # Дж/кг
# Максимальное значение удельной теплоты плавления
Lmax := dQmax*(τ2[30] - τ2[3])*60/m = 82148.8  # Дж/кг
# Минимальное значение удельной теплоты плавления
Lmin := dQmin*(τ2[30] - τ2[3])*60/m = 42958.6  # Дж/кг
# Абсалютная погрешность
ΔL := Lcr - Lmin = 19595.1  # Дж/кг
# L =6.573*10^4+- 2.059*10^4 | Дж/кг
# Относительная погрешность
δL := 2.059*10^4/(6.573*10^4)*100 = 31.3251  # %  # %
