# [component: outputs A]
t := A[:, 0]
t1 := 2000
i := 0 .. rows(A) - 1
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qwer(A, N) :=
    k ← 0
    M ← (round((rows(A) - 2)/N) - 2)*N
    for i ∈ 0, N .. M
        B[k, 0] ← A[i, 0]
        for j ∈ 1 .. cols(A) - 1
            B[k, j] ← |(A[i + N, j] - A[i, j])/(A[i + N, 0] - A[i, 0])|
        k ← k + 1
    B
j := 0, 50 .. rows(A) - 1
B := qwer(A, 1000)
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