# Лабораторная работа № 5
# Измерение вязкости жидкости.
# Протокол измерений
ORIGIN := 1
# Масса пикнометра
M_n := 12.306 + 0.605  # г.
ΔM_n := 0.0005  # г.
# Объем при Т=20 С
V_no := 28.67  # cm^3
ΔV_n := 0.005  # cm^3
d_k := 1.31  # mm
Δd_k := 0.005  # mm
a := 152.2  # mm
Δa := 0.05  # mm
L_k := 80.0  # mm
ΔL_k := 0.05  # mm
b := 117.2  # mm
Δb := 0.05  # mm
# Объем жидкости, протекающей через капилляр
V := 3.58  # cm^3
ΔV := 0.005  # cm^3
g := 9.8155  # м/c^2
# Результаты измерений
# Давление атмосферное
P_o := 760  # мм.рт.ст.
# Комнатная температура
T_k := 23.2  # оС
# Плотность масла в зависимости от температуры
# Масса  пикнометра с маслом (режимы 1 ... 4) в виде средних значенй для каждого режима
M1 := [37.7284; 37.7250; 37.7230; 37.7200; 37.7200]
M2 := [37.5512; 37.5287; 37.5247; 37.5237; 37.5212]
M3 := [37.3540; 37.3484; 37.3425; 37.3422; 37.3405]
M4 := [37.0896; 37.0716; 37.0696; 37.0686; 37.0669]
M(X) :=
    for i ∈ 1 .. 5
        m ← m + X[i]
    m ← m/5
M(M1) = 37.7233
M(M2) = 37.5299
M(M3) = 37.3455
M(M4) = 37.0733
M := [38.457; 38.279; 38.412; 38.174]
M_n := [12.306 + 0.605; 12.306 + 0.605; 12.306 + 0.605; 12.306 + 0.605]
# Рассчитаем температуру термостата
# Термоэдс термопары находящейся в термостате-Eti (режимы 1 ... 4)
Et1 := [2.1768; 2.1748; 2.1737; 2.1729; 2.1719]
Et2 := [2.5954; 2.5914; 2.5907; 2.2903; 2.5910]
Et3 := [3.0413; 3.0403; 3.0394; 3.0388; 3.0375]
Et4 := [3.4915; 3.4893; 3.4891; 3.4898; 3.4903]
Et1_cp := sum(Et1[i]/5, i = 1 .. 5)
Et2_cp := sum(Et2[i]/5, i = 1 .. 5)
Et3_cp := sum(Et3[i]/5, i = 1 .. 5)
Et4_cp := sum(Et4[i]/5, i = 1 .. 5)
Tt[1] := 25.01018*Et1_cp - 0.178407*Et1_cp^2
Tt[3] := 25.01018*Et3_cp - 0.178407*Et3_cp^2
Tt[2] := 25.01018*Et2_cp - 0.178407*Et2_cp^2
Tt[4] := 25.01018*Et4_cp - 0.178407*Et4_cp^2
Tt = [53.5294; 62.1762; 74.3693; 85.1125]
# Проведем аппроксимацию плотности воздуха от температуры при Ро
p := P_o*133.3
p = 101308  # Па
# Комнатная температура
T_k := 23.366  # C
# Из таблиц
ρ_20 := 1.205  # кг/м^3
ρ_26 := 1.176  # кг/м^3
ρ_b := (ρ_20 - (T_k - 20)*(ρ_20 - ρ_26)/(26 - 20))
ρ_b = 1.18873  # кг/м^3
ρ_b := 1.189*10^-3  # г/cм^3
# Оценка поправки на расширение пикнометра
α := 9*10^-6  # град^(-1)
V_n^3 == V_no^3*(1 + α*(T - 20))^3
V_n := V_no*(1 + α*(Tt - 20))
V_n = [28.6787; 28.6809; 28.684; 28.6868]  # cm^3
# Плотность жидкости при рабочих температурах
ρ_j := vectorize((M - M_n)/V_n) + ρ_b
ρ_j = [0.891956; 0.885681; 0.89022; 0.881838]  # г/cм^3
M = [38.457; 38.279; 38.412; 38.174]
# Методом наименьших квадратов производим линейную аппроксимацию зависимости плотности от температуры
ρ == C_1*T + C_2
C_1 := (sum(ρ_j[i]*Tt[i]/4, i = 1 .. 4) - sum(ρ_j[i]/4, i = 1 .. 4)*sum(Tt[i]/4, i = 1 .. 4))/(sum(Tt[i]^2/4, i = 1 .. 4) - sum(Tt[i]/4, i = 1 .. 4)^2)
C_1 = -0.000232001
C_2 := sum(ρ_j[i]/4, i = 1 .. 4) - C_1*sum(Tt[i]/4, i = 1 .. 4)
C_2 = 0.903385
ρ(Td) := C_1*Td + C_2
Td := 0, 0.01 .. 90
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# Расчет вязкости,η.
# Термоэдс термопары,находящейся в вискозиметре-Еi
E1 := [2.0435; 2.0461; 2.0478; 2.0499; 2.0533]
E2 := [2.4289; 2.4390; 2.4341; 2.4324; 2.4373]
E3 := [2.8573; 2.8606; 2.8634; 2.8659; 2.8710]
E4 := [3.2962; 3.2986; 3.2994; 3.3036; 3.3040]
E1_cp := sum(E1[i]/5, i = 1 .. 5)
E2_cp := sum(E2[i]/5, i = 1 .. 5)
E3_cp := sum(E3[i]/5, i = 1 .. 5)
E4_cp := sum(E4[i]/5, i = 1 .. 5)
T[1] := 25.176*E1_cp - 0.22745*E1_cp^2 + 8.7089*10^-3*E1_cp^3
T[2] := 25.176*E2_cp - 0.22745*E2_cp^2 + 8.7089*10^-3*E2_cp^3
T[3] := 25.176*E3_cp - 0.22745*E3_cp^2 + 8.7089*10^-3*E3_cp^3
T[4] := 25.176*E4_cp - 0.22745*E4_cp^2 + 8.7089*10^-3*E4_cp^3
T = [50.6842; 60.0647; 70.4343; 80.9255]  # C
ρ_k := C_1*T + C_2
ρ_k = [0.891626; 0.88945; 0.887044; 0.88461]  # г/cм^3
# плотность масла в капилляре
# Время истечения жидкости через капилляр (режимы 1 ... 4)
Δτ1 := [21.5; 20.8; 20.9; 20.9; 20.5]
Δτ2 := [16.2; 16.6; 16.3; 17; 17.5]
Δτ3 := [13; 13.1; 12.9; 12.8; 12.8]
Δτ4 := [10.9; 10.5; 10.5; 10.4; 10.5]
# Рассчёт средних значений времени истечения жидкости через капилляр
Δτ1_cp := sum(Δτ1[i]/5, i = 1 .. 5)
Δτ2_cp := sum(Δτ2[i]/5, i = 1 .. 5)
Δτ3_cp := sum(Δτ3[i]/5, i = 1 .. 5)
Δτ4_cp := sum(Δτ4[i]/5, i = 1 .. 5)
Δτ := [Δτ1_cp; Δτ2_cp; Δτ3_cp; Δτ4_cp]
Δτ = [20.92; 16.72; 12.92; 10.56]
# Рассчитываем вязкость по формуле
η := vectorize(π*(d_k/2)^4*ρ_k*g*10^-3*(a - b)^3/(24*V*L_k*(a^2 - b^2 - 2*a*b*ln(a/b)))*Δτ) - vectorize(ρ_k*V/(8*π*L_k*Δτ))
η = [0.00612712; 0.00485084; 0.00368899; 0.00295736]
i := 1 .. 4
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# Используем метод наименьших квадратов и найдем коэффициенты
# уравнения для описания вязкости от температуры.
ln(η(T)) == A + B*1/T
sum(ln(η[i]) - (A + B*1/T[i]), i = 1 .. 4)*1/T[i] == 0
sum(ln(η[i]) - (A + B*1/T[i]), i = 1 .. 4) == 0
T[i] = [50.6842; 60.0647; 70.4343; 80.9255]
G := [sum(1/T[i], i = 1 .. 4), sum(1/T[i]^2, i = 1 .. 4); sum(1, i = 1 .. 4), sum(1/T[i], i = 1 .. 4)]
H := [sum(1/T[i]*ln(η[i]), i = 1 .. 4); sum(ln(η[i]), i = 1 .. 4)]
# Система нормальных уравнений
G*K == H
К - коэффициенты(K[1] == A, K[2] == B)
K := G^-1*H
K = [-7.01917; 98.9487]
# Температура масла в вискозиметре
TW := [50.684; 60.065; 70.434; 80.925]
T := 10, 10.01 .. 80
A := -6.46155926
B := 76.04258779
J := 1, 2 .. 4
η_o(T) := e^(A + B*1/T)
η[1] = 0.00612712
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TT := 0.0125, 0.0126 .. 0.1
J := 1, 2 .. 4
η(TT) := e^(A + B*TT)
[22.994; 41.274; 49.172; 66.885]
RR := vectorize(1/TW)
1/TW = [0.0197301; 0.0166486; 0.0141977; 0.0123571]
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# Оценка погрешности определения вязкости.
η == π*(d_k/2)^4*ρ_k*g*10^-3*(a - b)^3/(24*V*L_k*(a^2 - b^2 - 2*a*b*ln(a/b)))*Δτ - ρ_k*V/(8*π*L_k*Δτ)
# Компоненты 1 и 2 погрешности
Δη == Δ(π*(d_k/2)^4*ρ_k*g*10^-3*(a - b)^3/(24*V*L_k*(a^2 - b^2 - 2*a*b*ln(a/b)))*Δτ) + Δ(ρ_k*V/(8*π*L_k*Δτ))
Δ(π*(d_k/2)^4*ρ_k*g*10^-3*(a - b)^3/(24*V*L_k*(a^2 - b^2 - 2*a*b*ln(a/b)))*Δτ) == δ1*(π*(d_k/2)^4*ρ_k*g*10^-3*(a - b)^3/(24*V*L_k*(a^2 - b^2 - 2*a*b*ln(a/b)))*Δτ)
δi - относительные
δ1 == sqrt(16*δ(d_k)^2 + δρ_k^2 + 9*δ(a - b)^2 + δ(Δτ)^2 + δV^2 + δL_k^2 + δ(a^2 - b^2 - 2*a*b*ln(a/b))^2)
δ_a_b := (Δa + Δb)/(a - b)
δ_dk := Δd_k/d_k
δρ_k == Δρ_k/ρ_k
δτ == Δ_Δτ/Δτ
δV := ΔV/V
δL_k := ΔL_k/L_k
δ(a^2 - b^2 - 2*a*b*ln(a/b)) == Δ(a^2 - b^2 - 2*a*b*ln(a/b))/(a^2 - b^2 - 2*a*b*ln(a/b))
δa := Δa/a
δb := Δb/b
Δ_a_b_2abln := sqrt((2*a - 2*b - 2*b*ln(a/b))^2*Δa^2 + (2*a - 2*b - 2*a*ln(a/b))^2*Δb^2)
δ_a_b_2abln := Δ_a_b_2abln/(a^2 - b^2 - 2*a*b*ln(a/b))
# Рассчитаем погрешность времени.
Δ_Δτpr := 0.2
Δ_Δτsl == t_p*sqrt(sum((Δτ_cp - Δτ[i])^2/(5*(5 - 1)), i = 1 .. 5))
Δτ_cp == 1/5*sum(Δτ[i], i = 1 .. 5)
t_p := 2.776
Δ1_Δτsl := t_p*sqrt(sum((Δτ1_cp - Δτ1[i])^2/(5*(5 - 1)), i = 1 .. 5))
Δ2_Δτsl := t_p*sqrt(sum((Δτ2_cp - Δτ2[i])^2/(5*(5 - 1)), i = 1 .. 5))
Δ3_Δτsl := t_p*sqrt(sum((Δτ3_cp - Δτ3[i])^2/(5*(5 - 1)), i = 1 .. 5))
Δ4_Δτsl := t_p*sqrt(sum((Δτ4_cp - Δτ4[i])^2/(5*(5 - 1)), i = 1 .. 5))
Δ1_Δτsl = 0.451047
Δ2_Δτsl = 0.665082
Δ3_Δτsl = 0.161867
Δ4_Δτsl = 0.242006
Δ_Δτ == sqrt(Δ_Δτpr^2 + Δ_Δτsl^2)
Δ_Δτ[1] := sqrt(Δ_Δτpr^2 + Δ1_Δτsl^2)
Δ_Δτ[2] := sqrt(Δ_Δτpr^2 + Δ2_Δτsl^2)
Δ_Δτ[3] := sqrt(Δ_Δτpr^2 + Δ3_Δτsl^2)
Δ_Δτ[4] := sqrt(Δ_Δτpr^2 + Δ4_Δτsl^2)
δτ := vectorize(Δ_Δτ/Δτ)
δτ = [0.0235851; 0.0415373; 0.0199145; 0.0297305]
# Рассчитаем погрешность вязкости.
Δρ_k == Δ(C_1*T) + ΔC_2
Δ(C_1*T) == sqrt(C_1^2*ΔT^2 + T^2*ΔC_1^2)
ΔE1 := 2.776*sqrt(sum((E1_cp - E1[i])^2/(5*(5 - 1)), i = 1 .. 5))
ΔE3 := 2.776*sqrt(sum((E3_cp - E3[i])^2/(5*(5 - 1)), i = 1 .. 5))
ΔE2 := 2.776*sqrt(sum((E2_cp - E2[i])^2/(5*(5 - 1)), i = 1 .. 5))
ΔE4 := 2.776*sqrt(sum((E4_cp - E4[i])^2/(5*(5 - 1)), i = 1 .. 5))
ΔT[1] := (25.176 - 2*0.22745*E1_cp + 3*8.7089*10^-3*E1_cp^2)*ΔE1
ΔT[2] := (25.176 - 2*0.22745*E2_cp + 3*8.7089*10^-3*E2_cp^2)*ΔE2
ΔT[3] := (25.176 - 2*0.22745*E3_cp + 3*8.7089*10^-3*E3_cp^2)*ΔE3
ΔT[4] := (25.176 - 2*0.22745*E4_cp + 3*8.7089*10^-3*E4_cp^2)*ΔE4
# Принимаем
ΔC_1 == 0
δV_n := ΔV_n/V_no
δM_n := ΔM_n/M_n
ΔC_2 := vectorize(sum(M[i]/4, i = 1 .. 4)/V_n)*sqrt(δV_n^2 + 1/16*sum(0.05*10^-3/M[i], i = 1 .. 4)^2) + vectorize(M_n/V_n)*sqrt(δM_n^2 + δV_n^2)
Δρ_k := |C_1|*ΔT + ΔC_2
δρ_k := vectorize(Δρ_k/ρ_k)
δ1 := vectorize(sqrt(16*δ_dk^2 + δρ_k^2 + 9*δ_a_b^2 + δτ^2 + δV^2 + δL_k^2 + δ_a_b_2abln^2))
δ_dk = 0.00381679
δV = 0.00139665
δ_a_b_2abln = 0.00608045
δ_a_b = 0.00285714
δL_k = 0.000625
δρ_k = [0.000651498; 0.000655038; 0.000666136; 0.000653233]
δτ = [0.0235851; 0.0415373; 0.0199145; 0.0297305]
Δ(ρ_k*V/(8*π*L_k*Δτ)) == δ2*ρ_k*V/(8*π*L_k*Δτ)
δ2 := vectorize(sqrt(δρ_k^2 + δV^2 + δL_k^2 + δτ^2))
δ1 = [0.0300424; 0.0455153; 0.0272562; 0.0350742]
δ2 = [0.0236436; 0.0415706; 0.0199843; 0.029777]
Δη := vectorize(δ1*(π*(d_k/2)^4*ρ_k*g*10^-3*(a - b)^3/(24*V*L_k*(a^2 - b^2 - 2*a*b*ln(a/b)))*Δτ) + δ2*(ρ_k*V/(8*π*L_k*Δτ)))
η := [0.01; 7.87*10^-3; 5.884*10^-3; 4.566*10^-3]
Δη = [0.000188148; 0.000229036; 0.000106323; 0.0001134]
δη := vectorize(Δη*100/η)
δη = [1.88148; 2.91024; 1.80698; 2.48357]
