# Считываем данные из файла для +50 градусов в пременную А
# [component: outputs A]
# Записываем столбец времени в переменную:
t := A[:, 0]
# Создаем счетчик (значение считаются с 0):
i := 0 .. rows(A) - 1
# Метка на графике для границы стационарного режима:
t1 := 2000
# Строим зависимость значений температур от времени:
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# Функция для нахождения производной с заданным шагом :
qwer(A, N) :=
    k ← 0
    M ← (round((rows(A) - 2)/N) - 2)*N
    for i ∈ 0, N .. M
        B[k, 0] ← A[i, 0]
        for j ∈ 1 .. cols(A) - 1
            B[k, j] ← |(A[i + N, j] - A[i, j])/(A[i + N, 0] - A[i, 0])|
        k ← k + 1
    B
# Производная функции с шагом:
B := qwer(A, 1000)
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# Производные для графиков 1-6:
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# Примем что режим считается не стационарным при значении производной > 2*10^3
# По аналогии сделаем для файлов +70 и + 80:
# [component: outputs A]
# Записываем столбец времени в переменную:
t := A[:, 0]
# Создаем счетчик (значение считаются с 0):
i := 0 .. rows(A) - 1
# Метка на графике для границы стационарного режима:
t1 := 2000
# Строим зависимость значений температур от времени:
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# Производная функции с шагом:
B := qwer(A, 1000)
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# Производные для графиков 1-6:
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# [component: outputs A]
# Записываем столбец времени в переменную:
t := A[:, 0]
# Создаем счетчик (значение считаются с 0):
i := 0 .. rows(A) - 1
# Метка на графике для границы стационарного режима:
t1 := 2000
# Строим зависимость значений температур от времени:
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# Производная функции с шагом:
B := qwer(A, 1000)
# Производные для графиков 1-6:
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