# Однополупериодный без фильтра
I_о := [11.57; 20.49; 37; 57.3; 91.8]
U_о := [13.75; 12.95; 11.46; 9.51; 6.64]
# Моствовой без фильтра
I_м := [22.8; 40.6; 73.2; 116.6; 180]
U_м := [27.3; 25.6; 22.7; 18.7; 13]
# Мостовой с  емкостным фильтром
I_мф := [30.4; 49; 84.4; 128; 187.5]
U_мф := [33.48; 30.7; 26.1; 20.6; 13.7]
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№18
U_ст := [0; 20; 35; 40; 42; 44; 46]
I_ст := [0; 4; 8; 10; 35; 60; 85]*10^-3
U_вых(U_вх, I) := U_вх - 1000*I  # disabled
# При U.вх = 80В | При U.вх = 100В
I_80(U_вых) := (80 - U_вых)/1000
I_100(U_вых) := (100 - U_вых)/1000
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